# Vorgegebene Auslegungsdaten:
# Bezeichnung und Wert:  Benennung:
T_an := 50 N*m
# Antriebsdrehmoment
#
# Abtriebsdrehmoment
#
# Schaltdrehzahl
T_ab1 := 650 N*m
n_S := 1100 min^-1
n_an := 2000 min^-1
# Antriebsdrehzahl
#
# Bohr-Abtriebskraft
#
# Belastungsfaktor
F_B := 1.5 kN
K_A := 2.0
# 1) Auslegen der Übersetzung und Bestimmung der Zähnezahlen
# rechnerisches Übersetzungsverhältnis
i_ges := T_ab1/T_an = 13
i_12 := 3.95  # TBM S. 269
i_34 := i_ges/i_12 = 3.29114
i_ges := i_12*i_34 = 13  # Das Gegenrechnen bestätigt den Wert für i_ges
n_ab := n_an/i_ges = 153.846 min^-1
# Zähnezahlen der Zahnräder
z_1 := 25
z_2 := z_1*i_12 = 98.75
z_2 := 99  # TBM S. 269
z_3 := 24
z_4 := z_3*i_34 = 78.9873
z_4 := 79
# tatsächliches Übersetzungsverhältnis
i_12 := z_2/z_1 = 3.96  # TBM S. 269
i_34 := z_4/z_3 = 3.29167
i_ges := i_12*i_34 = 13.035
# Abweichung Abtriebsparameter
T_ab2 := T_an*i_ges = 651.75 N*m  # Das ausgelegte Abtriebsdrehmoment weicht 0,3% im positiven Sinne von den Anforderungen ab.
T_ab2/T_ab1 = 1.00269
n_ab := n_an/i_ges = 153.433 min^-1
# 2) Berechnung der Wellen und Passfedern
τ_tzul := 50 N/mm^2  # Dauerfestigkeitsschubspannung von 42CrMo4
n_P := 1  # Anzahl Passfedern pro Welle-Nabe Verbindung
φ := 1  # Traganteil der Passfeder
R_e := 295 N/mm^2  # Streckgrenze E295
S_F := 1.1  # Sicherheit Fließgrenze
p_Fzul := R_e/S_F = 268.182 N/mm^2  # Zulässige Flächenpressung einer Passfeder
# Antriebswelle:
d_min1 := nthroot(16*T_an*K_A/(π*τ_tzul), 3) = 21.677 mm
d_W1 := 30 mm
t_1;W1 := 4 mm
l_t1 := 2*T_an/(d_W1*(7 mm - t_1;W1)*n_P*φ*p_Fzul) = 4.14313 mm
b_P1 := 8 mm
# Da die tragende Länge der Passfeder der ungefähren Breite der Zahnräder entsprechen sollte, wird im Folgenden die Länge an die später berechnete Zahnradbreite angeglichen.
l_P1 := 28 mm
# gewählt: Antriebswelle ⌀ 30mm
# Passfeder DIN 6885 - A8 x 7 x 28
# Vorgelegewelle:
d_min2 := nthroot(16*T_an*K_A*i_12/(π*τ_tzul), 3) = 34.2951 mm
d_W2 := 45 mm
t_1;W2 := 5.5 mm
l_t2 := 2*T_an*i_12/(d_W2*(9 mm - t_1;W2)*n_P*φ*p_Fzul) = 9.3753 mm
b_P2 := 14 mm
# Da die tragende Länge der Passfeder der ungefähren Breite der Zahnräder entsprechen sollte, wird im Folgenden die Länge an die später berechnete Zahnradbreite angeglichen.
l_P2 := 28 mm
l_P2 := 50 mm
# gewählt: Vorgelegewelle ⌀ 45mm
# Passfeder DIN 6885 - A14 x 9 x 28
# Passfeder DIN 6885 - A14 x 9 x 50
# Abtriebswelle:
d_min3 := nthroot(16*T_an*K_A*i_ges/(π*τ_tzul), 3) = 51.0157 mm
d_W3 := 60 mm
t_1;W3 := 7 mm
l_t3 := 2*T_an*i_ges/(d_W3*(11 mm - t_1;W3)*n_P*φ*p_Fzul) = 20.2521 mm
b_P3 := 18 mm
# Da die tragende Länge der Passfeder der ungefähren Breite der Zahnräder entsprechen sollte, wird im Folgenden die Länge an die später berechnete Zahnradbreite angeglichen.
l_P3 := 50 mm
# gewählt: Abtriebswelle ⌀ 60mm
# Passfeder DIN 6885 - A18 x 11 x 50
# 3) Zahnradbreite
B_zul := 4.0 N/mm^2  # Überschlägigier Belastungswert
# Formel nach Vereinbarungen
#
# Um auf eine ganze Zahl für die Breite zu kommen, wird hier aufgerundet. Da ein ständiger Eingriff der Zahnräder 1 und 2 nötig ist, wird das Zahnrad 2 aufgrund des größeren Durchmessers etwas kleiner gewählt.
b_1 := 2*T_an/(d_W1^2*B_zul) = 27.7778 mm
b_1 := 30 mm
b_2 := 28 mm
b_3 := 2*T_an*i_12/(d_W2^2*B_zul) = 48.8889 mm
# Formel nach Vereinbarungen
#
# Um auf eine ganze Zahl für die Breite zu kommen, wird hier aufgerundet. Da ein ständiger Eingriff der Zahnräder 3 und 4 nötig ist, wird das Zahnrad 4 aufgrund des größeren Durchmessers etwas kleiner gewählt.
b_3 := 52 mm
b_4 := 50 mm
# 4) Schrägungswinkel
# Der Schrägungswinkel ist mit  bereits in den Vereinbarungen gegeben.
β := 20°
# 5) Modul 1,2
m_n12 := 1.8*d_W1*cos(β)/(z_1 - 2.5) = 2.25526 mm  # Gl.:21.63
# gewählt:
m_n12 := 2.5 mm
# 6) Teilkreisdurchmesser Z1,Z2
d_1 := z_1*m_n12/cos(β) = 66.5111 mm
# TBM S. 267
d_2 := z_2*m_n12/cos(β) = 263.384 mm
# 7) Achsabstand 1,2
a_12 := (d_1 + d_2)/2 = 164.948 mm  # TBM S. 267
# 8) Modul 3,4
m_n34 := 2*a_12*cos(β)/((1 + i_34)*z_3) = 3.00971 mm  # Gl.:21.64 / TB:21-1
# gewählt:
m_n34 := 3 mm
# 9) Teilkreisdurchmesser Z3,Z4
d_3 := z_3*m_n34/cos(β) = 76.6208 mm
# TBM S. 267
d_4 := z_4*m_n34/cos(β) = 252.21 mm
# 10) Achsabstand 3,4
a_34 := (d_3 + d_4)/2 = 164.415 mm
# Differenz Achsabstände
p_v := a_12 - a_34 = 0.532089 mm  # Diese Differenz der Achsabstände muss durch eine Profilverschiebung angeglichen werden. Diese wird im Folgenden berechnet.
# 11) Profilverschiebung
# Aufgrund weniger Drehmomentkräfte an den Zahnrädern 1 und 2 haben wir uns dort für die Profilverschiebung entschieden.
# Stirneingriffswinkel
α_n := β = 20°
α_t := atan(tan(α_n)/cos(β)) = 21.1728°  # Gl.: 21.35
# Ersatzzähnezahl
β_b := acos(sin(α_n)/sin(α_t)) = 18.7472°  # Gl.: 21.36
z_n1 := d_1/(cos(β_b)^2*m_n12) = 29.6691  # Gl.: 21.47
z_n2 := d_2/(cos(β_b)*m_n12) = 111.256
# Profilverschiebungsfaktoren und Profilverschiebung
# Bei der Profilverschiebung V ist zum Berechnen der Wert x nötig. Dieser wird in der Formel für die Summe der Profilverschiebungsfaktoren errechnet, welche bis auf den Betriebseingriffswinkel zurückblickt. Daher werden im Folgenden mehrere Gleichungen angewendet, um letztendlich auf die Profilverschiebung zu kommen.
# Betriebseingriffswinkel:
α_wt := acos(cos(α_t)*a_12/a_34) = 20.6888°  # aus Gl.: 21.54 umgestellt
# Profilverschiebungsfaktoren:
invα_wt := tan(α_wt) - α_wt*π/(180°) = 0.0165575
# aus Hinweisen von S.797/809
invα_t := tan(α_t) - α_t*π/(180°) = 0.0177934
Σx := (invα_wt - invα_t)/(2*tan(α_n))*(z_1 + z_2) = -0.210523  # Gl.: 21.56
# x berechnen:
x_1 := Σx/2 + (0.5 - Σx/2)*log(z_2/z_1)/log(z_n1*z_n2/100) = 0.132955  # aus Gl.: 21.33 umgestellt
x_2 := Σx - x_1 = -0.343478
# Verschiebungen:
V_1 := x_1*m_n12 = 0.332387 mm
# Gl.: 21.49
V_2 := x_2*m_n12 = -0.858695 mm
V_3 := 0 mm
V_4 := 0 mm
# Betriebswälzkreisdurchmesser
d_wd1 := d_1*cos(α_t)/cos(α_wt) = 66.2966 mm  # Gl.: 21.22a
d_wd2 := d_2*cos(α_t)/cos(α_wt) = 262.534 mm  # Gl.: 21.22b
d_wd3 := d_3 = 76.6208 mm
d_wd4 := d_4 = 252.21 mm
# neuer Achsabstand
a_v12 := (d_wd1 + d_wd2)/2 = 164.415 mm  # Gl.:21.54 / 21.19
# Der Achsabstand ist nun, nach der Verschiebung der selbe.
a_v34 := (d_wd3 + d_wd4)/2 = 164.415 mm
# 12) Kopfspiel
# nötiges Kopfspiel
c_12 := 0.25*m_n12 = 0.625 mm  # Gl. von Seite 794 / 803
c_34 := 0.25*m_n34 = 0.75 mm
# Kopfhöhenänderung
k := a_v12 - a_12 - m_n12*(x_1 + x_2) = -0.00578098 mm  # Gl.: 21.23
# 13) Weitere Auslegungen der Zahnräder
# Grundkreisdurchmesser
d_b1 := d_1*cos(α_t) = 62.0213 mm  # Gl.: 21.39
d_b2 := d_2*cos(α_t) = 245.604 mm
d_b3 := d_3*cos(α_t) = 71.4485 mm
d_b4 := d_4*cos(α_t) = 235.185 mm
# Kopfkreisdurchmesser
d_a1 := d_1 + 2*(m_n12 + V_1 + k) = 72.1643 mm  # Gl.: 20.21
d_a2 := d_2 + 2*(m_n12 + V_2 + k) = 266.655 mm
d_a3 := d_3 + 2*m_n34 = 82.6208 mm  # Gl.: 21.40
d_a4 := d_4 + 2*m_n34 = 258.21 mm
# Fußkreisdurchmesser
d_f1 := d_1 - 2*((m_n12 + c_12) - V_1) = 60.9259 mm  # Gl.: 21.24
d_f2 := d_2 - 2*((m_n12 + c_12) - V_2) = 255.417 mm
d_f3 := d_3 - 2*m_n34 = 70.6208 mm  # Gl.: 21.41
d_f4 := d_4 - 2*m_n34 = 246.21 mm
# 14) Kopfspiel nach Profilverschiebung
c_12neu := a_v12 - 0.5*(d_a1 + d_f2) = 0.625 mm
# Da c_12 und c_12neu augenscheinlich gleich sind, ist das nötige Kopfspiel eingehalten.
# 15) Profilüberdeckung
# Überdeckung Zahnradpaar 1
m_t12 := m_n12/cos(β) = 2.66044 mm  # aus Gl.: 21.34 umgestellt
ε_β12 := b_2*tan(β)/(π*m_n12) = 1.29758  # Gl.: 21.44
# Gl.: 21.57
ε_α12 := (0.5*(sqrt(d_a1^2 - d_b1^2) + z_2/|z_2|*sqrt(d_a2^2 - d_b2^2)) - a_v12*sin(α_wt))/(π*m_t12*cos(α_t)) = 1.57575
ε_γ12 := ε_α12 + ε_β12 = 2.87333  # Gl.:21.46 / S.807
m_t34 := m_n34/cos(β) = 3.19253 mm  # aus Gl.: 21.34 umgestellt
ε_β34 := b_4*tan(β)/(π*m_n34) = 1.93092  # Gl.: 21.44
# Gl.: 21.57
ε_α34 := (0.5*(sqrt(d_a3^2 - d_b3^2) + z_4/|z_4|*sqrt(d_a4^2 - d_b4^2)) - a_v34*sin(α_wt))/(π*m_t34*cos(α_t)) = 1.70548
ε_γ34 := ε_α34 + ε_β34 = 3.6364  # Gl.:21.46 / S.807
# Da ε_α1 und  ε_α2 über 1,25 sind, ist die Mindestanforderung von 1,1 auf jeden Fall eingehalten.
# 16) Zusammenfassung wichtiger Komponenten der Zahnräder 1-4
# Zahnrad 1  Zahnrad 2  Zahnrad 3  Zahnrad 4
# Zähnezahl
z_1 = 25
z_2 = 99
z_3 = 24
z_4 = 79
# Teilkreisdurchmesser
d_1 = 66.5111 mm
d_2 = 263.384 mm
d_3 = 76.6208 mm
d_4 = 252.21 mm
# Betriebswälzdurchmesser
d_wd1 = 66.2966 mm
d_wd2 = 262.534 mm
d_wd3 = 76.6208 mm
d_wd4 = 252.21 mm
# Kopfkreisdurchmesser
d_a1 = 72.1643 mm
d_a2 = 266.655 mm
d_a3 = 82.6208 mm
d_a4 = 258.21 mm
# Fußkreisdurchmesser
d_f1 = 60.9259 mm
d_f2 = 255.417 mm
d_f3 = 70.6208 mm
d_f4 = 246.21 mm
# Zahnradbreite
b_1 = 30 mm
b_2 = 28 mm
b_3 = 52 mm
b_4 = 50 mm
# Modul
m_n12 = 2.5 mm
m_n34 = 3 mm
# Achsabstand
a_v12 = 164.415 mm
a_v34 = 164.415 mm
# Verschiebung
V_1 = 0.332387 mm
V_2 = -0.858695 mm
V_3 = 0 mm
V_4 = 0 mm
# Profilüberdeckung
ε_α12 = 1.57575
ε_α34 = 1.70548
# Sprungüberdeckung
ε_β12 = 1.29758
ε_β34 = 1.93092
# Gesamtüberdeckung
ε_γ12 = 2.87333
ε_γ34 = 3.6364
# 17) Zahnradkräfte
# Zahnrad 1:
# Umfangskraft:
F_T1 := 2*T_an/d_1 = 1.50351 kN  # Gl.:21.70
# Radialkraft:
F_R1 := F_T1*tan(α_n)/cos(β) = 0.582352 kN  # Gl.:21.72
# Axialkraft:
F_A1 := F_T1*tan(β) = 0.547232 kN  # Gl.:21.73
# Zahnrad 2:
# Umfangskraft:
F_T2 := |F_T1| = 1.50351 kN
# Radialkraft:
F_R2 := |F_R1| = 0.582352 kN
# Axialkraft:
F_A2 := |F_A1| = 0.547232 kN
# Zahnrad 3:
# Umfangskraft:
F_T3 := 2*T_an*i_12/d_3 = 5.16831 kN
# Radialkraft:
F_R3 := F_T3*tan(α_n)/cos(β) = 2.00184 kN
# Axialkraft:
F_A3 := F_T3*tan(β) = 1.88111 kN
# Zahnrad 4:
# Umfangskraft:
F_T4 := |F_T3| = 5.16831 kN
# Radialkraft:
F_R4 := |F_R3| = 2.00184 kN
# Axialkraft:
F_A4 := |F_A3| = 1.88111 kN
# Hier werden nur Beträge berechnet.
# Die Richtungen der Kräfte sind den Schnittverläufen der Wellen zu entnehmen.
# 18) Lagerkräfte und Schnittgrößenverläufe Antriebswelle
# Freischnitt der Antriebswelle
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# Längen:
X_1 := 33.5 mm
X_2 := 26.5 mm
# Lagerkräfte:
# XY-Ebene: | XZ-Ebene:
F_By1 := F_T1*X_1/(X_1 + X_2) = 0.839459 kN
F_Bz1 := (F_R1*X_1 + F_A1*d_1/2)/(X_1 + X_2) = 0.628455 kN
F_Ay1 := F_T1 - F_By1 = 0.664049 kN
F_Az1 := F_R1 - F_Bz1 = -0.0461029 kN
# Resultierende Lagerkräfte:
F_RA1 := sqrt(F_Ay1^2 + F_Az1^2) = 0.665648 kN
F_RB1 := sqrt(F_By1^2 + F_Bz1^2) = 1.04864 kN
# Da  wird das Lager A, mit den geringeren Radialkräften, als Festlager
# gewählt. Dadurch ergibt sich:  mit:
F_RA1 < F_RB1
F_Ax1 := -F_A1 = -0.547232 kN
F_Bx1 := 0 kN
# Schnittgrößenverläufe:
# XY-Ebene:
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# Das Moment  bezieht sich in allen folgenden Rechnungen auf den Punkt (S). Dabei ist der Schnittpunkt gemeint, also der Punkt, an dem die Normal- und Querkraft angreifen.
M_sA
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s_1min := 0 mm
s_1max := X_1 = 33.5 mm
s_2min := 0 mm
s_2max := X_2 = 26.5 mm
s_1 := 1 mm
s_2 := 1 mm
# positives Schnittufer:
F_N := -F_Ax1 = 0.547232 kN
F_Q := -F_Ay1 = -0.664049 kN
M_s1xy := F_Ay1*s_1
M_s1xymin := F_Ay1*s_1min = 0 N*m
M_s1xymax := F_Ay1*s_1max = 22.2457 N*m
# negatives Schnittufer:
F_N := F_Bx1 = 0 kN
F_Q := -F_By1 = -0.839459 kN
M_s2xy := F_By1*s_2
M_s2xymin := F_By1*s_2min = 0 N*m
M_s2xymax := F_By1*s_2max = 22.2457 N*m
# XZ-Ebene:
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# positives Schnittufer:
F_Q := -F_Az1 = 0.0461029 kN
M_s1xz := F_Az1*s_1
M_s1xzmin := F_Az1*s_1min = 0 N*m
M_s1xzmax := F_Az1*s_1max = -1.54445 N*m
# negatives Schnittufer:
F_Q := -F_Bz1 = -0.628455 kN
M_s2xz := F_Bz1*s_2
M_s2xzmin := F_Bz1*s_2min = 0 N*m
M_s2xzmax := F_Bz1*s_2max = 16.6541 N*m
# Maximales Drehmoment Antriebswelle
M_sAmax := sqrt(M_s2xymax^2 + M_s2xzmax^2) = 27.789 N*m
# 19) Lagerkräfte und Schnittgrößenverläufe Vorgelegewelle
# Freischnitt der Vorgelegewelle
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# Längen:
X_3 := 39.8 mm
X_4 := 101.7 mm
X_5 := 36.8 mm
# Lagerkräfte:
# XY-Ebene:
F_By2 := (F_T2*X_3 + F_T3*(X_3 + X_4))/(X_3 + X_4 + X_5) = 4.43721 kN
F_Ay2 := F_T2 + F_T3 - F_By2 = 2.2346 kN
# XZ-Ebene:
F_Bz2 := (F_R3*(X_3 + X_4) + F_A3*d_3/2 - F_A2*d_2/2 + F_R2*X_3)/(X_3 + X_4 + X_5) = 1.71866 kN
F_Az2 := F_R2 + F_R3 - F_Bz2 = 0.865527 kN
# Resultierende Lagerkräfte:
F_RA2 := sqrt(F_Ay2^2 + F_Az2^2) = 2.39637 kN
F_RB2 := sqrt(F_By2^2 + F_Bz2^2) = 4.75843 kN
# Da  wird das Lager A, mit den geringeren Radialkräften, als Festlager
# gewählt. Dadurch ergibt sich:  mit:
F_RA2 < F_RB2
F_Ax2 := F_A2 - F_A3 = -1.33388 kN
F_Bx2 := 0 kN
# Schnittgrößenverläufe:
# XY-Ebene:
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s_3min := 0 mm
s_3max := X_3 = 39.8 mm
s_4min := 0 mm
s_4max := X_4 = 101.7 mm
s_5min := 0 mm
s_5max := X_5 = 36.8 mm
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s_3 := s_3max
s_4 := s_4max
# erstes positives Schnittufer:
F_N := -F_Ax2 = 1.33388 kN
F_Q := -F_Ay2 = -2.2346 kN
M_s3xy := F_Ay2*s_3
M_s3xymin := F_Ay2*s_3min = 0 N*m
M_s3xymax := F_Ay2*s_3max = 88.9372 N*m
# zweites positives Schnittufer:
F_N := F_A2 - F_Ax2 = 1.88111 kN
F_Q := F_Ay2 - F_T2 = 0.731095 kN
M_s4xy := F_Ay2*(s_3 + s_4) - F_T2*s_4
M_s4xymin := F_Ay2*(s_3max + s_4min) - F_T2*s_4min = 88.9372 N*m
M_s4xymax := F_Ay2*(s_3max + s_4max) - F_T2*s_4max = 163.29 N*m
s_5 := 1 mm
# negatives Schnittufer:
F_N := F_Bx2 = 0 N
F_Q := -F_By2 = -4.43721 kN
M_s5xy := F_By2*s_5
M_s5xymin := F_By2*s_5min = 0 N*m
M_s5xymax := F_By2*s_5max = 163.29 N*m
# XZ-Ebene:
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# erstes positives Schnittufer:
F_Q := -F_Az2 = -0.865527 kN
M_s3xz := F_Az2*s_3
M_s3xzmin := F_Az2*s_3min = 0 N*m
M_s3xzmax := F_Az2*s_3max = 34.448 N*m
# zweites positives Schnittufer:
F_Q := F_Az2 - F_R2 = 0.283174 kN
M_s4xz := F_Az2*(s_3 + s_4) - F_R2*s_4 - F_A2*d_2/2
M_s4xzmin := F_Az2*(s_3max + s_4min) - F_R2*s_4min - F_A2*d_2/2 = -37.6182 N*m
M_s4xzmax := F_Az2*(s_3max + s_4max) - F_R2*s_4max - F_A2*d_2/2 = -8.81934 N*m
# negatives Schnittufer:
F_Q := -F_Bz2 = -1.71866 kN
M_s5xz := F_By2*s_5
M_s5xzmin := F_Bz2*s_5min = 0 N*m
M_s5xzmax := F_Bz2*s_5max = 63.2468 N*m
# Maximales Drehmoment Vorgelegewelle
M_sVmax := sqrt(M_s5xzmax^2 + M_s5xymax^2) = 175.11 N*m
# 20) Lagerkräfte und Schnittgrößenverläufe Abtriebswelle
# Freischnitt der Abtriebswelle
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# Längen:
X_6 := 39.7 mm
X_7 := 45.3 mm
# Lagerkräfte:
# XY-Ebene:
F_By3 := F_T4*X_6/(X_6 + X_7) = 2.4139 kN
F_Ay3 := F_T4 - F_By3 = 2.7544 kN
# XZ-Ebene:
F_Bz3 := (F_R4*X_6 - F_A4*d_4/2)/(X_6 + X_7) = -1.85582 kN
F_Az3 := F_R4 - F_Bz3 = 3.85766 kN
# Resultierende Lagerkräfte:
F_RA3 := sqrt(F_Ay3^2 + F_Az3^2) = 4.74007 kN
F_RB3 := sqrt(F_By3^2 + F_Bz3^2) = 3.04483 kN
# Da  wird das Lager B, mit den geringeren Radialkräften, als Festlager
# gewählt. Dadurch ergibt sich:  mit:
F_RB3 < F_RA3
F_Bx3 := F_A4 + F_B = 3.38111 kN
F_Ax3 := 0 kN
# Schnittgrößenverläufe:
# XY-Ebene:
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s_6min := 0 mm
s_7 := 1
s_6 := 1
s_6max := X_6 = 39.7 mm
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s_7min := 0 mm
s_7max := X_7 = 45.3 mm
# positives Schnittufer:
F_N := -F_Ax3 = 0 N
F_Q := F_Ay3 = 2.7544 kN
M_s6xy := F_Ay3*s_6
M_s6xymin := F_Ay3*s_6min = 0 N*m
M_s6xymax := F_Ay3*s_6max = 109.35 N*m
# negatives Schnittufer:
F_N := F_Bx3 - F_B = 1.88111 kN
F_Q := -F_By3 = -2.4139 kN
M_s7xy := F_By3*s_7
M_s7xymin := F_By3*s_7min = 0 N*m
M_s7xymax := F_By3*s_7max = 109.35 N*m
# XZ-Ebene:
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# positives Schnittufer:
F_Q := F_Az3 = 3.85766 kN
M_s6xz := F_Az3*s_6
M_s6xzmin := F_Az3*s_6min = 0 N*m
M_s6xzmax := F_Az3*s_6max = 153.149 N*m
# negatives Schnittufer:
F_Q := -F_Bz3 = 1.85582 kN
M_s7xz := F_Bz3*s_7
M_s7xzmin := F_Bz3*s_7min = 0 N*m
M_s7xzmax := F_Bz3*s_7max = -84.0686 N*m
# Maximales Drehmoment Abtriebswelle
M_sWmax := sqrt(M_s6xymax^2 + M_s6xzmax^2) = 188.181 N*m
# 21) Auswahl Lagergröße
# Antriebswelle
P_1L := |F_RB1| = 1.04864 kN
P_1F := 1.5 kN
p := 3  # Aufgrund von Rillenkugellager
L_10h := 10000 hr
# Loslager B
C_erf := P_1L*nthroot(n_an*L_10h/10^6, p) = 11.1435 kN  # Gl.: 14.1
# gewählt: 6006
# Festlager A
C_erf := P_1F*nthroot(n_an*L_10h/10^6, p) = 15.9399 kN  # Gl.: 14.1
# gewählt: 6206
# Vorgelegewelle
n_2 := 2000*min^-1/i_12 = 505.051 1/min
d_W2 = 45 mm
# Loslager B | Festlager A
P_2L := F_RB2 = 4.75843 kN
P_2F := 6 kN
C_erf := P_2L*nthroot(n_2*L_10h/10^6, p) = 31.9614 kN
C_erf := P_2F*nthroot(n_2*L_10h/10^6, p) = 40.3008 kN
Gl.:14.1
# gewählt: 6209 | gewählt: 6309
# Abtriebswelle
n_3 := 2000*min^-1/i_ges = 153.433 1/min
d_W3 = 60 mm
# Loslager A | Festlager B
P_3L := |F_RA3| = 4.74007 kN
P_3F := 10 kN
C_erf := P_3L*nthroot(n_3*L_10h/10^6, p) = 21.403 kN
C_erf := P_3F*nthroot(n_3*L_10h/10^6, p) = 45.1534 kN
# gewählt: 6012 | gewählt:6212
# 22) Lebensdauer der Lager
# Antriebswelle
c_6006 := 13.8 kN
l_10;6006 := 10^6/n_an*(c_6006/P_1L)^3 = 18992.2 hr  # Gl.: 14.5a
c_6206 := 20.3 kN
c_0.6206 := 11.2 kN
|F_Ax1|/F_RA1 = 0.822105
|F_Ax1|/c_0.6206 = 0.04886
|F_Ax1|/F_RA1 > e
# d.h.
X_6206 := 0.56
Y_6206 := 1.8  # TB: 14-3a
P_6206 := X_6206*F_RA1 + Y_6206*|F_Ax1| = 1.35778 kN
l_10h;6206 := 10^6/n_an*(c_6206/P_6206)^p = 27849.5 hr
# Vorgelegewelle
c_6209 := 33.5 kN
l_10;6209 := 10^6/n_2*(c_6209/P_2L)^3 = 11514.8 hr  # Gl.: 14.5a
c_0.6309 := 31.5 kN
c_6309 := 53 kN
|F_Bx2|/F_RB2 = 0
|F_Bx2|/c_0.6309 = 0
|F_Bx2|/F_RB2 < e
X_6309 := 1
Y_6309 := 0  # TB: 14-3a
P_6309 := X_6309*F_RB2 + Y_6309*|F_Bx2| = 4.75843 kN
l_10h;6309 := 10^6/n_3*(c_6309/P_6309)^p = 150095 hr
# Abtriebswelle
c_6012 := 29 kN
l_10;6012 := 10^6/n_3*(c_6012/P_3L)^3 = 24875.4 hr  # Gl.: 14.5a
c_6212 := 52 kN
c_0;6212 := 36 kN
|F_Bx3|/F_RA3 = 0.713304
|F_Bx3|/c_0;6212 = 0.0939197
|F_Bx3|/F_RA3 > e  # d.h.
X_6212 := 0.56
Y_6212 := 1.8  # TB: 14-3a
P_6212 := X_6212*F_RA3 + Y_6212*|F_Bx3| = 8.74044 kN
l_10;6212 := 10^6/n_3*(c_6212/P_6212)^3 = 22873.9 hr
# 23) Zusammenfassung der gewählten Lager
# Welle | Loslager | Lebensdauer | Festlager | Lebensdauer
# (hr) | (hr)
________________________________________________________________________
# Antriebswelle | 6006 | 19220 | 6206 | 27660
# Vorgelegewelle | 6209 | 11510 | 6309 | 150100
# Abtriebswelle | 6012 | 26410 | 6212 | 23290
# 24) Allgemeine Daten Festigkeitsnachweis
# Wellenmaterial nach Vereinbarungen 42CrMo4
R_m := 1100 N/mm^2
R_p0;2N := 900 N/mm^2  # TB: 1-1
σ_bWN := 550 N/mm^2
τ_tWN := 330 N/mm^2
R_z := 6.3 μm
# TB: 2-12
# 25) Festigkeitsnachweis Antriebswelle
# Statischer Festigkeitsnachweis: | Nach Schema RM S.72
# vorhandene Spannungen:
# Biegung
W_B1 := 0.012*(d_W1 + (d_W1 - t_1;W1))^3 = 2107.39 mm^3  # TB: 11-3
σ_bmax1 := M_sAmax/W_B1 = 13.1864 N/mm^2  # Bild 3.2
# Torsion
W_T1 := 0.2*(d_W1 - t_1;W1)^3 = 3515.2 mm^3  # TB: 11-3
τ_tmax1 := T_an/W_T1 = 14.2239 N/mm^2  # Bild 3.2
# Technologischer Größeneinflussfaktor
K_t1 := 1 - 0.26*log((d_W1 - t_1;W1)/(16 mm)) = 0.945178  # TB: 3-11
# Bauteilfestigkeit:
σ_bF1 := 1.2*R_p0;2N*K_t1 = 1020.79 N/mm^2
τ_tF1 := 1.2*R_p0;2N*K_t1/sqrt(3) = 589.355 N/mm^2
# Gesamtsicherheit:
S_F1 := 1/sqrt((σ_bmax1/σ_bF1)^2 + (τ_tmax1/τ_tF1)^2) = 36.5305
S_F1min := 2
# TB: 3-14
# Mit  ist die Antriebswelle bisher statisch fest.
S_F1 > S_F1min
# Dynamischer Festigkeitsnachweis: | Nach Schema RM S.73
# vorhandene Spannungen:
# Biegung
σ_ba1 := M_sAmax*K_A/W_B1 = 26.3729 N/mm^2  # Belastungsfaktor beachtet
σ_bm1 := 0 N/mm^2
# Hinweis S.73
# Torsion
τ_ta1 := T_an*K_A/W_T1 = 28.4479 N/mm^2
τ_tm1 := 0 N/mm^2
# Konstruktionsfaktoren:
# Kerbwirkungszahl
β_kb1 := 2.4
β_kt1 := 2.2  # TB: 3-8 / 3-9
# Geometrischer Größeneinflussfaktor
K_g1 := 1 - 0.2*log((d_W1 - t_1;W1)/(7.5 mm))/log(20) = 0.917002  # TB: 3-11c
# Oberflächenrauheit
K_Oσ1 := 1 - 0.22*log(R_z/μm)*(log(R_m/(20 N/mm^2)) - 1) = 0.869804  # TB: 3-10
K_Oτ1 := 0.575*K_Oσ1 + 0.425 = 0.925137
# Oberflächenverfestigung
K_V1 := 1.2
# TB: 3-12
K_Db1 := (β_kb1/K_g1 + 1/K_Oσ1 - 1)*1/K_V1 = 2.30576  # Gl.: 3.16
K_Dt1 := (β_kt1/K_g1 + 1/K_Oτ1 - 1)*1/K_V1 = 2.0667
# Wechselfestigkeit für die Antriebswelle
σ_bGW1 := K_t1*σ_bWN/K_Db1 = 225.457 N/mm^2
τ_tGW1 := K_t1*τ_tWN/K_Dt1 = 150.921 N/mm^2
# Durch das wählen von  und  werden die weiteren
#
# Zwischenrechnungen aus dem Roloff/Matek gleich null. So kann direkt die Gesamtsicherheit berechnet werden.
σ_bm1 = 0 N/mm^2
τ_tm1 = 0 N/mm^2
# Gesamtsicherheit
S_D1 := 1/sqrt((σ_ba1/σ_bGW1)^2 + (τ_ta1/τ_tGW1)^2) = 4.50772
S_D1min := 1.5
# Voraussetzung
S_z1 := 1.2
# TB: 3-14c
S_Derf1 := S_D1min*S_z1 = 1.8  # Gl.: 3.31
# Mit  ist die Antriebswelle dauerfest.
S_D1 > S_Derf1
# 26) Festigkeitsnachweis Vorgelegewelle
# Statischer Festigkeitsnachweis: | Nach Schema RM S.72
# vorhandene Spannungen:
# Biegung
W_B2 := 0.012*(d_W2 + (d_W2 - t_1;W2))^3 = 7240.21 mm^3  # TB: 11-3
σ_bmax2 := M_sVmax/W_B2 = 24.1858 N/mm^2  # Bild 3.2
# Torsion
W_T2 := 0.2*(d_W2 - t_1;W2)^3 = 12326 mm^3  # TB: 11-3
τ_tmax2 := T_an*i_12/W_T2 = 16.0636 N/mm^2  # Bild 3.2
# Technologischer Größeneinflussfaktor
K_t2 := 1 - 0.26*log((d_W2 - t_1;W2)/(16 mm)) = 0.897956  # TB: 3-11
# Bauteilfestigkeit:
σ_bF2 := 1.2*R_p0;2N*K_t2 = 969.792 N/mm^2
τ_tF2 := 1.2*R_p0;2N*K_t2/sqrt(3) = 559.91 N/mm^2
# Gesamtsicherheit:
S_F2 := 1/sqrt((σ_bmax2/σ_bF2)^2 + (τ_tmax2/τ_tF2)^2) = 26.3061
S_F2min := 2
# TB: 3-14
# Mit  ist die Vorgelegewelle bisher statisch fest.
S_F2 > S_F2min
# Dynamischer Festigkeitsnachweis: | Nach Schema RM S.73
# vorhandene Spannungen:
# Biegung
σ_ba2 := M_sVmax*K_A/W_B2 = 48.3716 N/mm^2  # Belastungsfaktor beachtet
σ_bm2 := 0 N/mm^2
# Hinweis S.73
# Torsion
τ_ta2 := T_an*i_12*K_A/W_T2 = 32.1273 N/mm^2
τ_tm2 := 0 N/mm^2
# Konstruktionsfaktoren:
# Kerbwirkungszahl
β_kb2 := 2.4
β_kt2 := 2.2  # TB: 3-8 / 3-9
# Geometrischer Größeneinflussfaktor
K_g2 := 1 - 0.2*log((d_W2 - t_1;W2)/(7.5 mm))/log(20) = 0.889082  # TB: 3-11c
# Oberflächenrauheit
K_Oσ2 := 1 - 0.22*log(R_z/μm)*(log(R_m/(20 N/mm^2)) - 1) = 0.869804  # TB: 3-10
K_Oτ2 := 0.575*K_Oσ2 + 0.425 = 0.925137
# Oberflächenverfestigung
K_V2 := 1.2
# TB: 3-12
K_Db2 := (β_kb2/K_g2 + 1/K_Oσ2 - 1)*1/K_V2 = 2.37425  # Gl.: 3.16
K_Dt2 := (β_kt2/K_g2 + 1/K_Oτ2 - 1)*1/K_V2 = 2.12949
# Wechselfestigkeit für die Vorgelegewelle
σ_bGW2 := K_t2*σ_bWN/K_Db2 = 208.014 N/mm^2
τ_tGW2 := K_t2*τ_tWN/K_Dt2 = 139.154 N/mm^2
# Durch das wählen von  und  werden die weiteren
#
# Zwischenrechnungen aus dem Roloff/Matek gleich null. So kann direkt die Gesamtsicherheit berechnet werden.
σ_bm2 = 0 N/mm^2
τ_tm2 = 0 N/mm^2
# Gesamtsicherheit
S_D2 := 1/sqrt((σ_ba2/σ_bGW2)^2 + (τ_ta2/τ_tGW2)^2) = 3.05169
S_D2min := 1.5
# Voraussetzung
S_z2 := 1.4
# TB: 3-14c
S_Derf2 := S_D2min*S_z2 = 2.1  # Gl.: 3.31
# Mit  ist die Vorgelegewelle dauerfest.
S_D2 > S_Derf2
# 27) Festigkeitsnachweis Abtriebswelle
# Statischer Festigkeitsnachweis: | Nach Schema RM S.72
# vorhandene Spannungen:
# Biegung
W_B3 := 0.012*(d_W3 + (d_W3 - t_1;W3))^3 = 17314.8 mm^3  # TB: 11-3
σ_bmax3 := M_sWmax/W_B3 = 10.8682 N/mm^2  # Bild 3.2
# Torsion
W_T3 := 0.2*(d_W3 - t_1;W3)^3 = 29775.4 mm^3  # TB: 11-3
τ_tmax3 := T_ab2/W_T3 = 21.8889 N/mm^2  # Bild 3.2
# Technologischer Größeneinflussfaktor
K_t3 := 1 - 0.26*log((d_W3 - t_1;W3)/(16 mm)) = 0.864759  # TB: 3-11
# Bauteilfestigkeit:
σ_bF3 := 1.2*R_p0;2N*K_t3 = 933.94 N/mm^2
τ_tF3 := 1.2*R_p0;2N*K_t3/sqrt(3) = 539.211 N/mm^2
# Gesamtsicherheit:
S_F3 := 1/sqrt((σ_bmax3/σ_bF3)^2 + (τ_tmax3/τ_tF3)^2) = 23.6802
S_F3min := 2
# TB: 3-14
# Mit  ist die Abtriebswelle bisher statisch fest.
S_F3 > S_F3min
# Dynamischer Festigkeitsnachweis: | Nach Schema RM S.73
# vorhandene Spannungen:
# Biegung
σ_ba3 := M_sWmax*K_A/W_B3 = 21.7365 N/mm^2  # Belastungsfaktor beachtet
σ_bm3 := 0 N/mm^2
# Hinweis S.73
# Torsion
τ_ta3 := T_ab2*K_A/W_T3 = 43.7777 N/mm^2
τ_tm3 := 0 N/mm^2
# Konstruktionsfaktoren:
# Kerbwirkungszahl
β_kb3 := 2.4
β_kt3 := 2.2  # TB: 3-8 / 3-9
# Geometrischer Größeneinflussfaktor
K_g3 := 1 - 0.2*log((d_W3 - t_1;W3)/(7.5 mm))/log(20) = 0.869455  # TB: 3-11c
# Oberflächenrauheit
K_Oσ3 := 1 - 0.22*log(R_z/μm)*(log(R_m/(20 N/mm^2)) - 1) = 0.869804  # TB: 3-10
K_Oτ3 := 0.575*K_Oσ3 + 0.425 = 0.925137
# Oberflächenverfestigung
K_V3 := 1.2
# TB: 3-12
K_Db3 := (β_kb3/K_g3 + 1/K_Oσ3 - 1)*1/K_V3 = 2.42503  # Gl.: 3.16
K_Dt3 := (β_kt3/K_g3 + 1/K_Oτ3 - 1)*1/K_V3 = 2.17603
# Wechselfestigkeit für die Abtriebswelle
σ_bGW3 := K_t3*σ_bWN/K_Db3 = 196.129 N/mm^2
τ_tGW3 := K_t3*τ_tWN/K_Dt3 = 131.143 N/mm^2
# Durch das wählen von  und  werden die weiteren
#
# Zwischenrechnungen aus dem Roloff/Matek gleich null. So kann direkt die Gesamtsicherheit berechnet werden.
σ_bm3 = 0 N/mm^2
τ_tm3 = 0 N/mm^2
# Gesamtsicherheit
S_D3 := 1/sqrt((σ_ba3/σ_bGW3)^2 + (τ_ta3/τ_tGW3)^2) = 2.84305
S_D3min := 1.5
# Voraussetzung
S_z3 := 1.4
# TB: 3-14c
S_Derf3 := S_D3min*S_z3 = 2.1  # Gl.: 3.31
# Mit  ist die Abtriebswelle dauerfest.
S_D3 > S_Derf3
# 28) Schmierstoffberechnung
# Ölstand reicht bis zur hälfte des untersten Zahnrades
# Kraft-Geschwindigkeits-Faktor für Stirnradgetriebe mit:
k_s_v := (3*F_T3/(b_3*d_3)*(i_34 + 1)/i_34)*1/(π*d_3*n_an/i_ges) = 8.24263 MPa*s/m  # GL.20-2
# Wir verwenden CLP 460 als Schmieröl | TB 20-7a
# CLP 460 nach DIN 51517; Viskositätsklasse 460;
# kinematische Viskosität ca.
500*mm^2/s
# 29) Fliehkraftkupplung
N_FK := 3
m_FK := 0.5 kg
r_FK := 50 mm
F_F := 20 N
D_R := 140 mm
µ_0 := 0.9
ω := 2*π*n_S = 115.192 1/s  # Winkelgeschwindigkeit
F_Flieh := m_FK*r_FK*ω^2 = 331.728 N  # Fliehkraft
F_NK := F_Flieh - F_F = 311.728 N  # Kontaktkraft
F_R := µ_0*F_NK = 280.556 N  # Reibkraft zwischen Fliehkörper und Gehäuse
T_R := N_FK*F_R*D_R/2 = 58.9167 N·m  # Reibmoment
# Da das erforderliche Antriebsdrehmoment von 50Nm hier großzügig eingehalten wird, wird die Fliehkraftkupplung mit drei Fliehkörpern gebaut.
