N_FK := 3  # Anzahl Fliehkörper
n_S := 1100 min^-1  # Schaltdrehzahl
m_FK := 0.5 kg  # Masse Fliehkörper
r_FK := 50 mm  # Fliehkörperschwerpunktradius
F_F := 20 N  # Gesamtfederkraft
D_R := 140 mm  # Reibdurchmesser
µ_0 := 0.9  # Haftreibwert
ω := 2*π*n_S = 115.192 1/s  # Winkelgeschwindigkeit
F_Flieh := m_FK*r_FK*ω^2 = 331.728 N  # Fliehkraft
F_NK := F_Flieh - F_F = 311.728 N  # Kontaktkraft
F_R := µ_0*F_NK = 280.556 N  # Reibkraft zwischen Fliehkörper und Gehäuse
T_R := N_FK*F_R*D_R/2 = 58.9167 N·m  # Reibmoment
# Da das erforderliche Antriebsdrehmoment von 50Nm hier großzügig eingehalten wird, wird die Fliehkraftkupplung mit drei Fliehkörpern gebaut.
