# Abkürzung | Benennung | Abkürzung | Benennung
# a_12 | Achsabstand 1,2 | d_W1 | Gewählter Durchmesser Welle 1
# a_34 | Achsabstand 3,4 | d_W2 | Gewählter Durchmesser Welle 2
# d_W3 | Gewählter Durchmesser Welle 3
# a_v12 | neuer Achsabstand 1,2
# a_v34 | (neuer) Achsabstand 3,4
# d_wd1 | Betriebswälzkreisdurchmesser 1
# b_1 | Breite Zahnrad 1 | d_wd2 | Betriebswälzkreisdurchmesser 2
# b_2 | Breite Zahnrad 2 | d_wd3 | Betriebswälzkreisdurchmesser 3
# b_3 | Breite Zahnrad 3 | d_wd4 | Betriebswälzkreisdurchmesser 4
# b_4 | Breite Zahnrad 4
# F_B | Axiale Bohrkraft
# b_P1 | Breite Passfeder auf Welle 1 | F_t | Umfangskraft
# b_P2 | Breite Passfeder auf Welle 2 | F_R | Radialkraft
# b_P3 | Breite Passfeder auf Welle 3 | F_a | Axialkraft
# B_zul | Überschlägiger Belastungswert | i_12 | Übersetzungsverhältnis 1,2
# i_34 | Übersetzungsverhältnis 3,4
# c_12 | Kopfspiel 1,2 | i_ges | Gesamtübersetzung
# c_34 | Kopfspiel 3,4
# c_12neu | Kopfspiel nach Verschiebung | k | Kopfhöhenänderung
# d_1 | Teilkreisdurchmesser Z1 | K_A | Belastungsfaktor
# d_2 | Teilkreisdurchmesser Z2
# d_3 | Teilkreisdurchmesser Z3 | l_t1 | Tragende Länge Passfeder 1
# d_4 | Teilkreisdurchmesser Z4 | l_t2 | Tragende Länge Passfeder 2
# l_t3 | Tragende Länge Passfeder 3
# d_a1 | Kopfkreisdurchmesser Z1
# d_a2 | Kopfkreisdurchmesser Z2 | l_P1 | Länge Passfeder 1 gesamt
# d_a3 | Kopfkreisdurchmesser Z3 | l_P2 | Länge Passfeder 2 gesamt
# d_a4 | Kopfkreisdurchmesser Z4 | l_P2 | Länge Passfeder 3 gesamt
# d_b1 | Grundkreisdurchmesser Z1 | m_n12 | Modul 1,2
# d_b2 | Grundkreisdurchmesser Z2 | m_n34 | Modul 3,4
# d_b3 | Grundkreisdurchmesser Z3
# d_b4 | Grundkreisdurchmesser Z4 | m_t12 | Stirnmodul 1,2
# m_t34 | Stirnmodul 3,4
# d_f1 | Fußkreisdurchmesser Z1
# d_f2 | Fußkreisdurchmesser Z2 | n_an | Antriebsdrehmoment
# d_f3 | Fußkreisdurchmesser Z3 | n_ab | Abtriebsdrehmoment
# d_f4 | Fußkreisdurchmesser Z4
# n_P | Anzahl Passfedern pro Verbindung
# d_min1 | Mindestdurchmesser Welle 1
# d_min2 | Mindestdurchmesser Welle 2 | n_S | Schaltdrehzahl Fliehkraftkupplung
# d_min3 | Mindestdurchmesser Welle 3
# p_Fzul | Zulässige Flächenpressung Passfeder
# Abkürzung | Bennenung | p_v | Differenz Achsabstände
# R_e | Streckgrenze E295
# Abkürzung | Bennenung
# S_F | Sicherheit Fließgrenze
# φ | Traganteil der Passfeder
# T_an | Antriebsdrehmoment
# T_ab1 | Abtriebsdrehmoment Vorgabe | τ_tzul | Dauerfestigkeitsschubspannung von 42CrMo4
# T_ab2 | Abtriebsdrehmoment Ausarbeitung
# V_1 | Verschiebung 1
# V_2 | Verschiebung 2
# V_3 | Verschiebung 3
# V_4 | Verschiebung 4
# Σx | Summe von x_1 und x_2
# x_1 | Variable zur Verschiebung
# x_2 | Variable zur Verschiebung
# z_1 | Zähnezahl Zahnrad 1
# z_2 | Zähnezahl Zahnrad 2
# z_3 | Zähnezahl Zahnrad 3
# z_4 | Zähnezahl Zahnrad 4
# z_n1 | Ersatzzähnezahl 1
# z_n2 | Ersatzzähnezahl 2
# α_n | Normaleingriffswinkel
# α_t | Stirneingriffswinkel
# α_wt | Betriebseingriffswinkel
# invα_wt | Profilverschiebungsfaktor Teil
# invα_t | Profilverschiebungsfaktor Teil
# β | Schrägungswinkel
# β_b | Grundschrägungswinkel
# ε_α12 | Profilüberdeckung 1,2
# ε_α34 | Profilüberdeckung 3,4
# ε_β12 | Sprungüberdeckung 1,2
# ε_β34 | Sprungüberdeckung 3,4
# ε_γ12 | Gesamtüberdeckung 1,2
# ε_γ34 | Gesamtüberdeckung 3,4
