T_an := 50 N*m  # Anfangsdrehmoment
K_A := 2  # Belastungsfaktor
τ_tzul := 50 N/mm^2  # Dauerfestigkeitsschubspannung von 42CrMo4
n_P := 1  # Anzahl Passfedern pro Welle-Nabe Verbindung
φ := 1  # Traganteil der Passfeder
R_e := 295 N/mm^2  # Streckgrenze E295
S_F := 1.1  # Sicherheit Fließgrenze
p_Fzul := R_e/S_F = 268.182 N/mm^2  # Zulässige Flächenpressung einer Passfeder
# Antriebswelle
d_min1 := nthroot(16*T_an*K_A/(π*τ_tzul), 3) = 21.677 mm
d_W1 := 30 mm
l_t1 := 2*T_an/(d_W1*(7 mm - 4 mm)*n_P*φ*p_Fzul) = 4.14313 mm
b_P1 := 8 mm
# Da die tragende Länge nicht geringer als die Breite der Passfeder sein darf, wird hier die Breite addiert und auf die nächste genormte Länge gerundet.
l_P1 := l_t1 + b_P1 = 12.1431 mm
# gewählt: Antriebswelle ⌀ 30mm
# Passfeder DIN 6885 - A8 x 7 x 14
# Vorgelegewelle
d_min2 := nthroot(16*T_an*K_A*i_12/(π*τ_tzul), 3)
d_W2 := □ mm  # error: Fehlender Term oder Ausdruck.
l_t2 := 2*T_an*i_12/(d_W2*(h - t1)*n_P*φ*p_Fzul)
b_P2 := □ mm  # error: Fehlender Term oder Ausdruck.
# Da die tragende Länge nicht geringer als die Breite der Passfeder sein darf, wird hier die Breite addiert und auf die nächste genormte Länge gerundet.
l_P2 := l_t2 + b_P2
# gewählt: Vorgelegewelle ⌀ mm
# Passfeder DIN 6885 -
# Abtriebswelle
d_min3 := nthroot(16*T_an*K_A*i_13/(π*τ_tzul), 3)
d_W3 := □*mm  # error: Fehlender Term oder Ausdruck.
l_t3 := 2*T_an*i_13/(d_W3*(h - t1)*n_P*φ*p_Fzul)
b_P3 := □*mm  # error: Fehlender Term oder Ausdruck.
# Da die tragende Länge nicht geringer als die Breite der Passfeder sein darf, wird hier die Breite addiert und auf die nächste genormte Länge gerundet.
l_P3 := l_t3 + b_P3
# gewählt: Vorgelegewelle ⌀ mm
# Passfeder DIN 6885 -
