# Vereinbarte Konstanten:
# Normaleingriffs-winkelwinkel:
# Schrägungswinkel:
# Überschlägiger
# Belastungswert:
# Anwendungsfaktor:
α_n := 20°
β := 20°
B_zul := 4 N/mm^2
K_A := 2.0
# Druckkraft
# vom Boden:
# Schaltdrehzahl:
# Dauerfestigkeitsschubspannung:
F_B := 1500 N
n_s := 1400 rpm
τ_Tzul := 50 N/mm^2  # (42CrMo4)
# Antriebsdrehzahl:
n_Antrieb := 2000*1/min
# Übersetzungsverhältnis:
# Antriebsmoment:
T_an := 50 N*m
# Theoretisch benötigte Übersetzungen:
i_1 := 3.40
i_2 := 2.95  # orientiert an TB 21-11
i_Gesamt := i_1*i_2
i_Gesamt = 10.03
# Errechnete Übersetzungen (siehe Zahnraddaten):
i'_1 := 3.381
i'_2 := 2.964
i'_Gesamt := i'_1*i'_2
i'_Gesamt = 10.0213
# Moment der Vorgelegewelle:
T_Vorgelege := T_an*i'_1
T_Vorgelege = 169.05 N*m
# Abtriebsmoment:
T_ab := T_an*i'_Gesamt
T_ab = 501.064 N*m
# Fliehkraftkupplung:
N_FK := 2
F_F := 15 N
n_s := 1400 1/min
ω_s := 2*π*n_s = 146.608 1/s
μ_0 := 0.9
r_FK := 50 mm
m_FK := 1 kg
Δl := 2.5 mm
d_R := 140 mm
# Federsteifigkeit:
C := F_F/Δl
C = 6 N/mm
# Bei Schaltdrehzahl:
# Fliehkraft:
F_Flieh := m_FK*r_FK*ω_s^2
F_Flieh = 1.07469 kN
# Kontaktkraft:
F_N := (F_Flieh - 2*F_F)
F_N = 1.04469 kN
# Reibkraft eines Fliehkörpers:
F_R := μ_0*F_N
F_R = 940.221 N
# Reib-/Schaltmoment:
T_R := N_FK*F_R*d_R/2
T_R = 131.631 N·m
# Entwurfsdurchmesser:
# Antriebswelle:  Vorgelegewelle:  Abtriebswelle:
d_min2 := nthroot((16*T_Vorgelege*K_A)/(π*τ_Tzul), 3)
d_min3 := nthroot((16*T_ab*K_A)/(π*τ_Tzul), 3)
d_min1 := nthroot((16*T_an*K_A)/(π*τ_Tzul), 3)
d_min2 = 32.5348 mm
d_min3 = 46.7349 mm
d_min1 = 21.677 mm
# Gewählt:
d_W2 := 35 mm
# Gewählt:
d_W3 := 50 mm
# Gewählt:
d_W1 := 25 mm
# Zahnraddaten:
# Ritzelzähnezahlen:
z_1 := 21
z_3 := 28
z_2 := 71
z_4 := 83
i'_1 := z_2/z_1 = 3.38095
i'_2 := z_4/z_3 = 2.96429
# Damit ist i'_1 ~ i_1 und i'_2 ~ i_2
i'_ges := i'_1*i'_2 = 10.0221
# orientiert an TB 21-12
# Modul 1,2:
m_n12 := (1.8*d_W1*cos(β))/(z_1 - 2.5)
m_n12 = 2.28574 mm  # nach Gl. 21-63
# Gerundet:
m_n12 := 2.5 mm  # nach TB 21-1
# Teilkreisdurchmesser 1,2:
d_1 := (z_1*m_n12)/cos(β)
d_1 = 55.8693 mm
# nach Gl. 21-38
d_2 := (z_2*m_n12)/cos(β)
d_2 = 188.892 mm
# Zahnradbreite 1,2:
# Zahnrad Z1:
b_1 := (2*T_an)/(d_1^2*B_zul)
b_1 = 8.00927 mm  # nach Vereinbarung
# Gewählt:
b_1 := 70 mm  # gewählt nach TB-21-13 a/b.)
b_2 := b_1
# Null-Achsabstand 1,2:
a_d1 := (d_1 + d_2)/2
a_d1 = 122.38 mm  # nach Gl. 21-8
# Modul 3,4:
m_n34 := (2*a_d1*cos(β))/((1 + i_2)*z_3)
m_n34 = 2.07957 mm  # nach Gl. 21-64
# Gerundet:
m_n34 := 2.5 mm  # nach TB 21-1
# Teilkreisdurchmesser 3,4:
d_3 := (z_3*m_n34)/cos(β)
d_3 = 74.4924 mm
# nach Gl. 21-38
d_4 := (z_4*m_n34)/cos(β)
d_4 = 220.817 mm
# Zahnradbreite 3,4:
# Zahnrad Z3:
b_3 := (2*T_Vorgelege)/(d_3^2*B_zul)
b_3 = 15.2321 mm  # nach Vereinbarung
# Gewählt:
b_3 := 65 mm  # gewählt nach TB-21-13 a/b.)
b_4 := b_3
# Null-Achsabstand 3,4:
a_d2 := (d_3 + d_4)/2
a_d2 = 147.655 mm
a_d1 = 122.38 mm  # nach Gl. 21-8
a_d1 - a_d2 = -25.2742 mm
# Die Nullachsabstände sind verschieden, a_d1wird angeglichen. D.h. eine positive Profilverschiebung wird an den Zahnrädern z_1 und z_2 vorgenommen, damit keine Schwächung des Ritzels entsteht.
# Profilverschiebung:
# Stirneingriffswinkel:
α_t := atan(tan(α_n)/cos(β))
α_t = 21.1728°  # nach Gl. 21-35
# Betriebseingriffswinkel:
α_wt := acos(cos(α_t)*a_d1/a_d2)*360°/(2*π)
α_wt = 39.3869°  # nach Gl. 21-66
# Summe Profilverschiebungsfaktoren:
invα_wt := tan(α_wt) - α_wt*2*π/360°
invα_t := tan(α_t) - α_t*2*π/360°
invα_wt = 0.133595
invα_t = 0.0177934
Σx := (invα_wt - invα_t)/(2*tan(α_n))*(z_1 + z_2)  # nach Gl. 21-55
Σx = 14.6355
# Ersatzzähnezahlen:
β_b := acos(cos(β)*cos(α_n)/cos(α_t))
β_b = 18.7472°  # nach Gl. 21-36
cos²(β_b) := 1/2*(1 + cos(2*β_b))
cos²(β_b) = 0.896706  # Additionstheorem
z_n1 := z_1/(cos²(β_b)*cos(β))
z_n2 := z_2/(cos²(β_b)*cos(β))  # nach Gl. 21-47
z_n1 = 24.922
z_n2 = 84.2602
# Sinnvolle Wahl von x_1 nach Gl. 21.33 im Roloff/Matek
x_1 := Σx/2 + (0.5 - Σx/2)*log(z_2/z_1)/log(z_n1*z_n2/100)
# nach Gl. 21-33
#
# Hinweis S.732
x_1 = 4.58984
x_2 := Σx - x_1
x_2 = 10.0456
# Verschiebungen:
V_1 := x_1*m_n12
V_1 = 11.4746 mm
# nach Gl. 21-49
V_2 := x_2*m_n12
V_2 = 25.1141 mm
V_3 := 0 mm
V_4 := 0 mm
# Maße der Zahnräder nach Profilverschiebung:
# Kopfhöhenänderung:
k := a_d2 - a_d1 - m_n12*(x_1 + x_2)
k = -11.3145 mm  # nach Gl. 21-23
# Kopfspiel (Soll):
c_12 := 0.25*m_n12
c_12 = 0.625 mm
# nach S.754 korrigierte Seitenzahl
c_34 := 0.25*m_n34
c_34 = 0.625 mm
# Kopfkreisdurchmesser nach Profilverschiebung:
d_a1 := d_1 + 2*m_n12 + 2*V_1 + 2*k
d_a1 = 61.1896 mm  # nach Gl. 21-24
d_a2 := d_2 + 2*m_n12 + 2*V_2 + 2*k
d_a2 = 221.491 mm
d_a3 := d_3 + 2*m_n34
d_a3 = 79.4924 mm  # nach Gl. 21-40
d_a4 := d_4 + 2*m_n34
d_a4 = 225.817 mm
# Fußkreisdurchmesser nach Profilverschiebung:
d_f1 := d_1 - 2*((m_n12 + c_12) - V_1)
d_f1 = 72.5685 mm  # nach Gl. 21-25
d_f2 := d_2 - 2*((m_n12 + c_12) - V_2)
d_f2 = 232.87 mm
d_f3 := d_3 - 2.5*m_n34
d_f3 = 68.2424 mm  # nach Gl. 21-41
d_f4 := d_4 - 2.5*m_n34
d_f4 = 214.567 mm
# Kopfspiel nach Profilverschiebung:
c := a_d2 - 0.5*(d_a1 + d_f2)
c = 0.625 mm  # nach S.759
# Prüfen der Zahndicke am Kopfkreis:
# tangentiales Modul:
m_t12 := m_n12/cos(β)
# min. Kopfdicke des Zahnes:
s_a12min := 0.2*m_n12  # nach S.717
s_a12min = 0.5 mm
# Stirnteilung:
p_t12 := m_t12*π  # nach Gl. 21-34
# Stirnzahndicke:
s_t1 := p_t12/2 + 2*V_1*tan(α_t)  # nach Gl. 21-51
# "s_t1" ist in Bezug auf den tangentialen Stirnschnitt (S-S) durch das Zahnrad. (S.727 - Bild 21-14)
# "s_a1" ist auf den Kopfkreis bezogen
# nach S.731
# "α_at1" entspricht
# "α_yt1" aus Roloff Matek
# Profilwinkel am Kopfkreis:
α_at1 := acos(d_1*cos(α_t)/d_a1)
invα_at1 := tan(α_at1) - α_at1*2*π/(360°)  # aus Vorlesung
# Kopfdicke des Zahnes an den gewählten Zahnrädern (nach Profilverschiebung):
s_a1 := d_a1*(s_t1/d_1 + invα_t - invα_at1)
s_a1 = 11.4909 mm  # nach Gl. 21-53
# Stirnzahndicke:
s_t2 := p_t12/2 + 2*V_2*tan(α_t)
# Profilwinkel am Kopfkreis:
α_at2 := acos(d_2*cos(α_t)/d_a2)
invα_at2 := tan(α_at2) - α_at2*2*π/(360°)
# Kopfdicke des Zahnes an den gewählten Zahnrädern (nach Profilverschiebung):
s_a2 := d_a2*(s_t2/d_2 + invα_t - invα_at2)
s_a2 = 7.06765 mm
# Sowohl s_a1 als auch s_a2 sind > s_a12min . Die Zahndicke am Kopfkreis ist damit ausreichend. Zusätzliche Prüfung über TB 21-12 R/M führt zum gleichen Ergebnis.
# Grundkreisdurchmesser db:
# (Der Durchmesser welcher von der Normalen N-N, die durch den Berührpunkt der Zahnflanken geht, tangiert wird - Bild 21.3)
d_b1 := d_1*cos(α_t)
d_b1 = 52.0979 mm
d_b2 := d_2*cos(α_t)
d_b2 = 176.14 mm
# nach Gl. 21-2
d_b3 := d_3*cos(α_t)
d_b3 = 69.4638 mm
d_b4 := d_4*cos(α_t)
d_b4 = 205.911 mm
# Profilüberdeckung:
# Profilüberdeckung des ersten Zahnradpaares:
# nach Gl. 21-57
ε_α12 := (0.5*(sqrt(d_a1^2 - d_b1^2) + z_2/|z_2|*sqrt(d_a2^2 - d_b2^2)) - a_d2*sin(α_wt))/(π*m_t12*cos(α_t))
ε_α12 = -1.34789
ε_β12 := b_1*tan(β)/p_t12
ε_β12 = 3.04832  # nach Gl. 21-44
ε_γ12 := ε_α12 + ε_β12
ε_γ12 = 1.70042  # nach Gl. 21-46
# -> Profilüberdeckung des ersten Zahnradpaares ist ausreichend (nach Erklärung S. 729)
# Profilüberdeckung des zweiten Zahnradpaares:
ε_α34 := (0.5*(sqrt(d_a3^2 - d_b3^2) + z_2/|z_2|*sqrt(d_a4^2 - d_b4^2)) - a_d2*sin(α_wt))/(π*m_t12*cos(α_t))
ε_α34 = -3.59486
ε_β34 := b_3*tan(β)/p_t12
ε_β34 = 2.83058
ε_γ34 := ε_α34 + ε_β34
ε_γ34 = -0.764283
# -> Profilüberdeckung des zweiten Zahnradpaares ist ausreichend (nach Erklärung S. 729)
# Betriebswälzkreisdurchmesser:
d_w1 := d_1*cos(α_t)/cos(α_wt)
d_w1 = 67.4076 mm  # nach Gl. 21-22a
d_w2 := d_2*cos(α_t)/cos(α_wt)
d_w2 = 227.902 mm  # nach Gl. 21-22b
d_w3 := d_3
d_w3 = 74.4924 mm
d_w4 := d_4
d_w4 = 220.817 mm
# Kontrolle Achsabstand:
a := (d_w1 + d_w2)/2 = 147.655 mm
# identisch mit:
a_d2 = 147.655 mm
a := (d_w3 + d_w4)/2 = 147.655 mm
# Zusammenfassung:
d_f1 = 72.5685 mm
d_1 = 55.8693 mm
d_b1 = 52.0979 mm
d_a1 = 61.1896 mm
d_f2 = 232.87 mm
d_2 = 188.892 mm
d_b2 = 176.14 mm
d_a2 = 221.491 mm
d_f3 = 68.2424 mm
d_3 = 74.4924 mm
d_b3 = 69.4638 mm
d_a3 = 79.4924 mm
d_f4 = 214.567 mm
d_4 = 220.817 mm
d_b4 = 205.911 mm
d_a4 = 225.817 mm
m_n12 = 2.5 mm
b_1 = 70 mm
d_w1 = 67.4076 mm
z_1 = 21
b_2 = 70 mm
d_w2 = 227.902 mm
z_2 = 71
m_n34 = 2.5 mm
b_3 = 65 mm
d_w3 = 74.4924 mm
z_3 = 28
b_4 = 65 mm
d_w4 = 220.817 mm
z_4 = 83
ε_α34 = -3.59486
x_1 = 4.58984
V_1 = 11.4746 mm
ε_α12 = -1.34789
ε_β34 = 2.83058
x_2 = 10.0456
V_2 = 25.1141 mm
ε_β12 = 3.04832
ε_γ34 = -0.764283
V_3 = 0 mm
ε_γ12 = 1.70042
V_4 = 0 mm
# Passfederberechnung:
# Werkstoff Passfeder E295 GC
S_F := 1.1
Re := 295 N/mm^2
p_fzul := Re/S_F
p_fzul = 268.182 N/mm^2
# nach TB 12-1b
K_λ := 1
K_A = 2
φ := 1  # für n=1
n_Pass := 1
# Antriebswelle - Fliehkraftkupplung
# für Wellendurchmesser 25mm:  -Passfeder DIN 6885 - A8x7x28
h_Pass := 7 mm
l_Pass := 28 mm
h := 3.0 mm
b_Pass := 8 mm
l'_Pass := l_Pass - b_Pass
d_Kritisch1 := 25 mm
p_m := 2*K_A*T_an*K_λ/(d_Kritisch1*h*l'_Pass*n_Pass*φ) = 133.333 N/mm^2
# p_m < p_fzul | nach Gl. 12-1
# Werkstoff Passfeder E295 GC
S_F := 1.1
Re := 295 N/mm^2
p_fzul := Re/S_F
p_fzul = 268.182 N/mm^2
# nach TB 12-1b
K_λ := 1
K_A = 2
φ := 1  # für n=1
n_Pass := 1
# Abtriebswelle - Rutschkupplung
# für Wellendurchmesser 50mm:  -Passfeder DIN 6885 - A14x9x70
h_Pass := 9 mm
l_Pass := 70 mm
h := 3.5 mm
b_Pass := 14 mm
l'_Pass := l_Pass - b_Pass
d_Kritisch1 := 50 mm
p_m := 2*K_A*T_ab*K_λ/(d_Kritisch1*h*l'_Pass*n_Pass*φ) = 204.516 N/mm^2
# p_m < p_fzul | nach Gl. 12-1
# Werkstoff Passfeder E295 GC
S_F := 1.1
Re := 295 N/mm^2
p_fzul := Re/S_F
p_fzul = 268.182 N/mm^2
# nach TB 12-1b
K_λ := 1
K_A = 2
φ := 1  # für n=1
n_Pass := 1
# Vorgelegewelle - Rutschkupplung
# für Wellendurchmesser 35mm:  -Passfeder DIN 6885 - A10x8x28
h_Pass := 8 mm
l_Pass := 28 mm
h := 3 mm
b_Pass := 10 mm
l'_Pass := l_Pass - b_Pass
d_Kritisch1 := 35 mm
p_m := 2*K_A*T_Vorgelege*K_λ/(d_Kritisch1*h*l'_Pass*n_Pass*φ) = 357.778 N/mm^2
# p_m < p_fzul | nach Gl. 12-1
# Vorauswahl der Lagergrößen:
# (Vorauswahl erfolgte durch Schätzung der wirklichen Lagerbelastungen, Anpassung der Lagerung erfolgte nach Ermittlung der Lagerkräfte)
# Festlager Abtriebswelle:
n_Antrieb = 2000 1/min
P := 6 kN
p := 3
n := n_Antrieb/i'_Gesamt
L_10h := 10000 hr
C_erf := P*nthroot(n*L_10h/10^6, p)
# nach Gl. 14.1 (Faktor 60 weggelassen wegen den Einheiten)
C_erf = 29.5736 kN
# Festlager Antriebswelle:
n := n_Antrieb
L_10h := 10000 hr
P := 2.5 kN
p := 3
C_erf := P*nthroot(n*L_10h/10^6, p)
C_erf = 26.5665 kN
# Festlager Vorgelegewelle:
L_10h := 10000 hr
P := 4 kN
p := 3
n := n_Antrieb/i'_1
C_erf := P*nthroot(n*L_10h/10^6, p)
# nach Gl. 14.1
C_erf = 28.3209 kN
# Loslager An-/Abtriebswelle:
P := 6 kN
p := 3
# eig.: 3,3333
n := n_Antrieb - n_Antrieb/i'_Gesamt
L_10h := 10000 hr
C_erf := P*nthroot(n*L_10h/10^6, p)
C_erf = 61.564 kN
# Loslager Vorgelegewelle:
P := 6.5 kN
p := 3
# eig.: 3,3333
n := n_Antrieb/i'_1
L_10h := 10000 hr
C_erf := P*nthroot(n*L_10h/10^6, p)
C_erf = 46.0213 kN
# Ermittlung der Lagerkräfte aus Freischnitt:
# Lagerkräfte an der Antriebswelle:
# Antriebsmoment
T_an = 50 N*m
# Wälzkreisdurchmesser
d_w1 = 67.4076 mm
# Wirkabstände
X_1 := 45.3 mm
X_2 := 52.5 mm
# Zahnrad Z1
F_tZ1 := 2*T_an/d_w1
# Umfangskraft
# nach Gl. 21.70
F_tZ1 = 1.48351 kN
F_aZ1 := F_tZ1*tan(β)  # Axialkraft
# nach Gl. 21.72
F_aZ1 = 0.539955 kN
F_rZ1 := (F_tZ1*tan(α_n))/cos(β)  # Radialkraft
# nach Gl. 21.71
F_rZ1 = 0.574608 kN
# Loslager
F_L1y := F_tZ1*X_2/(X_1 + X_2)
F_L1y = 0.796364 kN
F_L1z := (-F_aZ1*d_w1/2 + F_rZ1*X_1)/(X_1 + X_2)
F_L1z = 0.0800738 kN
# Festlager
F_F1x := F_aZ1
F_F1x = 0.539955 kN
F_F1y := F_tZ1 - F_L1y
F_F1y = 0.687149 kN
F_F1z := F_rZ1 - F_L1z
F_F1z = 0.494534 kN
# Lagerkräfte an der Vorgelegewelle:
# Moment an der Vorgelegewelle:
T_Vorgelege = 169.05 N*m
# Wälzkreisdurchmesser
d_w2 = 227.902 mm
d_w3 = 74.4924 mm
# Wirkabstände
X_3 := 48.5 mm
X_4 := 104.15 mm
X_5 := 49.85 mm
# Zahnrad Z2
F_aZ2 := -F_aZ1
F_tZ2 := -F_tZ1
F_rZ2 := -F_rZ1
# Zahnrad Z3
F_tZ3 := 2*T_Vorgelege/d_w3
F_tZ3 = 4.53872 kN
F_aZ3 := F_tZ3*tan(β)
F_aZ3 = 1.65196 kN
F_rZ3 := F_tZ3*tan(α_n)/cos(β)
F_rZ3 = 1.75798 kN
# Loslager
F_L2y := -(F_tZ2*X_3 + F_tZ3*(X_3 + X_4))/(X_3 + X_4 + X_5)
F_L2y = -3.0661 kN
F_L2z := (-F_rZ2*X_3 + F_aZ2*d_w2/2 + F_rZ3*(X_3 + X_4) + F_aZ3*d_w3/2)/(X_3 + X_4 + X_5)
F_L2z = 1.46284 kN
# Festlager
F_F2x := F_aZ3 + F_aZ2
F_F2x = 1.112 kN
F_F2y := -F_tZ2 - F_tZ3 - F_L2y
F_F2y = 0.010894 kN
F_F2z := F_rZ2 - F_rZ3 + F_L2z
F_F2z = -0.869747 kN
# Die Lagerkräfte  ,  und  wurden im Freischnitt falsch herum orientiert angenommen, daraus resultiert ihr negativer Wert. Für die weitere Berechnung wird die Orientierung der Kraftvektoren positiv angenommen daher folgt:
F_L2y
F_F2y
F_F2z
F_L2y := 4.707 kN
F_F2y := 0.051 kN
F_F2z := 1.303 kN
# Lagerkräfte an der Abtriebswelle:
# Bodenkraft
F_B := 1.5 kN
# Abtriebsmoment
T_ab = 501.064 N*m
# Wälzkreisdurchmesser
d_w4 = 220.817 mm
# Wirkabstände
X_6 := 49.35 mm
X_7 := 51.65 mm
# Zahnrad Z4
F_aZ4 := -F_aZ3
F_tZ4 := -F_tZ3
F_rZ4 := -F_rZ3
F_tZ4 := 2*T_ab/d_w4
F_tZ4 = 4.53828 kN
F_aZ4 := F_tZ3*tan(β)
F_aZ4 = 1.65196 kN
F_rZ4 := F_tZ4*tan(α_n)/cos(β)
F_rZ4 = 1.75781 kN
# Loslager
F_L3y := -F_tZ4*X_7/(X_6 + X_7)
F_L3y = -2.32081 kN
F_L3z := (-F_rZ4*X_7 - F_aZ4*d_w4/2)/(X_6 + X_7)
F_L3z = -2.70476 kN
# Festlager
F_F3x := -F_aZ4 + F_B
F_F3x = -0.151957 kN
F_F3y := -F_tZ4 - F_L3y
F_F3y = -2.21747 kN
F_F3z := -F_rZ4 - F_L3z
F_F3z = 0.946953 kN
# Die Lagerkräfte  ,  und  wurden im Freischnitt falsch herum orientiert angenommen, daraus resultiert ihr negativer Wert. Für die weitere Berechnung wird die Orientierung der Kraftvektoren positiv angenommen daher folgt:
F_L3y
F_L3z
F_F3y
F_L3y := 3.564 kN
F_L3z := 3.176 kN
F_F3y := 3.406 kN
# Wälzlagerberechnung:
# Festlager Antriebswelle:
C_0 := 14.3 kN  # aus WLK
F_a := |F_F1x| = 0.539955 kN  # aus Freischnitt
F_r := sqrt(F_F1y^2 + F_F1z^2) = 0.846603 kN
# daraus ergibt sich nach TB 14-3a X und Y zu:
X := 1
F_a/C_0 = 0.0377591
F_a/F_r = 0.637789  # Seite 509 unten
Y := 0.55
e := 1.14  # aus TB14-3a
P := X*F_r + Y*F_a = 1.14358 kN  # nach Gl. 14.6
p := 3  # für Kugellager  # nach Seite 508 unten
C := 21.6 kN  # nach WLK
L_10h := 10^6/n_Antrieb*(C/P)^p = 56154.2 hr  # nach Gl. 14.5a (Faktor 60 weggelassen wegen den Einheiten)
# Loslager Antriebswelle:
F_a := 0 kN  # aus Freischnitt
F_r := sqrt((F_L1y + F_L1z)^2) = 0.876438 kN
P := F_r = 0.876438 kN  # Seite 509 unten
p := 10/3  # für Rollenlager
C := 14 kN  # aus WLK
# Die Drehzahl am Loslager ergibt sich durch die gleiche Drehrichtung der Wellen zu:n_Antrieb - n_Antrieb/i'_Gesamt = 1800.42 1/min
L_10h := 10^6/(n_Antrieb - n_Antrieb/i'_Gesamt)*(C/P)^p = 95023.2 hr
mit
i'_Gesamt = 10.0213
# Festlager Vorgelegewelle:
C_0 := 28 kN  # aus WLK
F_a := |F_F2x| = 1.112 kN  # aus Freischnitt
F_r := sqrt(F_F2y^2 + F_F2z^2) = 1.304 kN
F_a/C_0 = 0.0397144
F_a/F_r = 0.852764
# weil 0.02< | F_a/C_0 | <=0.5 ergibt sich e zu:
e := 0.51*(F_a/C_0)^0.233 = 0.240506  # aus TB14-3a Fußnote
# daraus ergibt sich nach TB 14-3a X und Y zu:
# (weil Fa/Fr > e ist, siehe Fußnote)
X := 0.56
Y := 0.866*(F_a/C_0)^-0.229 = 1.81284
P := X*F_r + Y*F_a = 2.74612 kN
p := 3  # für Kugellager
C := 40 kN  # aus WLK
L_10h := 10^6/(n_Antrieb/i'_1)*(C/P)^p = 87072.3 hr  # mit
i'_1 = 3.38095
n_Antrieb = 2000 1/min
# Loslager Vorgelegewelle:
F_a := 0 kN  # aus Freischnitt
F_r := sqrt(F_L2y^2 + F_L2z^2) = 4.92907 kN
P := F_r = 4.92907 kN
p := 10/3  # für Zylinderrollenlager
C := 35.8 kN  # aus WLK
L_10h := 10^6/(n_Antrieb/i'_1)*(C/P)^p = 20905 hr
# Festlager Abtriebswelle:
C_0 := 47.5 kN  # aus WLK
F_a := |F_F3x| = 0.151957 kN  # aus Freischnitt
F_r := sqrt((F_L1y + F_L3y)^2 + (F_L1z + F_L3z)^2) = 5.44195 kN
# daraus ergibt sich nach TB 14-3a X und Y zu:
X := 1
F_a/C_0 = 0.0031991
F_a/F_r = 0.0279233  # Seite 509 unten
Y := 0.55
e := 1.14  # aus TB14-3a
P := X*F_r + Y*F_a = 5.52552 kN  # nach Gl. 14.6
p := 3  # für Kugellager  # nach Seite 508 unten
C := 60 kN  # nach WLK
# mit
n_Abtrieb := n_Antrieb/i'_Gesamt
L_10h := 10^6/n_Abtrieb*(C/P)^p = 106924 hr
# nach Gl. 14.5a
# Loslager Abtriebswelle:
F_a := 0 kN  # aus Freischnitt
F_r := sqrt(F_L3y^2 + F_L3z^2) = 4.77379 kN
P := F_r = 4.77379 kN  # Seite 509 unten
p := 3  # für Kugellager
C := 69.5 kN  # aus WLK
# Die Drehzahl am Loslager ergibt sich durch die gleiche Drehrichtung der Wellen zu:n_Antrieb - n_Antrieb/i'_Gesamt = 1800.42 1/min
L_10h := 10^6/(n_Antrieb - n_Antrieb/i'_Gesamt)*(C/P)^p = 28565.3 hr
mit
i'_Gesamt = 10.0213
# Zusammenfassung Lebensdauern:
# Antriebswelle - Loslager
L_10h := 21221 hr
# Antriebswelle - Festlager
L_10h := 19374 hr
# Vorgelegewelle - Loslager
L_10h := 15981 hr
# Vorgelegewelle - Festlager
L_10h := 36486 hr
# Abtriebswelle - Loslager
L_10h := 28568 hr
# Abtriebswelle - Festlager
L_10h := 80256 hr
# Festigkeitsnachweis der Wellen:
# Antriebswelle:
# Kraft- und Momentenverläufe (siehe auch Isometrie der Antriebswelle):
# Y-Z-Ebene: | X-Y-Ebene: | X-Z-Ebene:
# Schnitt entlangs_1(positives Schnittufer)
s_1max := 45.3*mm
s_1min := 0*mm
N_x := 0
N_x := 0
Mt(s_1) := 0
Q_y(s_1) := -F_L1y = -0.796364 kN
Q_z(s_1) := -F_L1z = -0.0800738 kN
Mb_z(s_1) := -F_L1y*s_1
Mb_y(s_1) := -F_L1z*s_1
Mb_z(s_1max) = -36.0753 N*m
Mb_y(s_1max) = -3.62734 N*m
Mb_z(s_1min) = 0 N*m
Mb_y(s_1min) = 0 N*m
# Schnitt entlangs_2(negatives Schnittufer)
s_2max := 52.5*mm
s_2min := 0*mm
N_x := -F_F1x = -0.539955 kN
N_x := -F_F1x = -0.539955 kN
Mt(s_2) := 50 N*m
Q_y(s_2) := F_F1y = 0.687149 kN
Q_z(s_2) := F_F1z = 0.494534 kN
Mb_z(s_2) := -F_F1y*s_2
Mb_y(s_2) := -F_F1z*s_2
Mb_z(s_2max) = -36.0753 N*m
Mb_y(s_2max) = -25.963 N*m
Mb_z(s_2min) = 0 N*m
Mb_y(s_2min) = 0 N*m
# Statischer & dynamischer Festigkeitsnachweis Antriebswelle:
Rz := 6.3 μm
d_Kritisch1 := 25 mm
Rm := 1100 N/mm^2
Wb_1 := π/32*d_Kritisch1^3 = 1533.98 mm^3
W_t1 := π/16*d_Kritisch1^3 = 3067.96 mm^3
# Flächenträgheitsmoment aus TB11-3
Mb_res1 := sqrt(Mb_z(s_2max)^2 + Mb_y(s_2max)^2)
T_max := T_an  # da das Anfahren mit Anlaufkupplung erfolgt
R_p0.2N := 900 N/mm^2
K_t := 1 - 0.34*log(d_Kritisch1/(16 mm)) = 0.934101
# nach TB 1-1 | nach TB 3-11
# Biegung: | Torsion:
σ_bmax := Mb_res1/Wb_1 = 28.9747 N/mm^2
τ_tmax := T_an/W_t1 = 16.2975 N/mm^2
# nach Bild 3-2
σ_ba := K_A*Mb_res1/Wb_1 = 57.9494 N/mm^2
τ_ta := K_A*T_an/W_t1 = 32.5949 N/mm^2
σ_bF := 1.2*R_p0.2N*K_t = 1008.83 N/mm^2
τ_tF := 1.2*R_p0.2N*K_t/sqrt(3) = 582.448 N/mm^2
# nach Flowchart Bild 3-31
σ_bWN := 550 N/mm^2
τ_tWN := 330 N/mm^2
# aus TB 1-1
β_kb := 2.5
β_kt := 2.2
# aus TB 3-8 mit Rm =1100N/mm^2, wegen Passfeder
K_g := 1 - 0.2*log(d_Kritisch1/(7.5 mm))/log(20) = 0.919621  # aus TB 3-11c
K_0σ := 1 - 0.22*log(Rz/μm)*(log(Rm/(20 N/mm^2)) - 1) = 0.869804  # aus TB 3-10
# aus TB 3-10
K_0τ := 0.575*K_0σ + 0.425 = 0.925137
K_V := 1
# aus TB 3-12
K_Db := (β_kb/K_g + 1/K_0σ - 1)*1/K_V = 2.8682
K_Dt := (β_kt/K_g + 1/K_0τ - 1)*1/K_V = 2.47321
# aus Bild 3-27 | nach Gl. 3-16
σ_bGW := K_t*σ_bWN/K_Db = 179.121 N/mm^2
τ_tGW := K_t*τ_tWN/K_Dt = 124.637 N/mm^2
# nach Gl. 3-17 | nach Gl. 3-17
S_F := 1/sqrt((σ_bmax/σ_bF)^2 + (τ_tmax/τ_tF)^2) = 24.939
# nach Bild 3-31
S_D := 1/sqrt((σ_ba/σ_bGW)^2 + (τ_ta/τ_tGW)^2) = 2.40383  # nach Bild 3-32
# Ergebnis: Die Antriebswelle ist dauerfest.
# Vorgelegewelle:
# Kraft- und Momentenverläufe (siehe auch Isometrie der Vorgelegewelle):
# Y-Z-Ebene: | X-Y-Ebene: | X-Z-Ebene:
# Schnitt entlangs_3(positives Schnittufer)
s_3max := 49.85*mm
s_3min := 0*mm
Mt(s_3) := 0
N_x := 0
N_x := 0
Q_y(s_3) := -F_L2y = -4.707 kN
Q_z(s_3) := F_L2z = 1.46284 kN
Mb_z(s_3) := -F_L2y*s_3
Mb_y(s_3) := F_L2z*s_3
Mb_z(s_3max) = -234.644 N*m
Mb_y(s_3max) = 72.9224 N*m
Mb_z(s_3min) = 0 N*m
Mb_y(s_3min) = 0 N*m
# Schnitt entlangs_4(positives Schnittufer)
s_4max := 104.15*mm
s_4min := 0*mm
N_x := -F_aZ3 = -1.65196 kN
N_x := -F_aZ3 = -1.65196 kN
Q_y(s_4) := -F_L2y + F_tZ3 = -0.168285 kN
Q_z(s_4) := F_L2z - F_rZ3 = -0.29514 kN
Mb_z(s_4) := -F_L2y*(s_3max + s_4) + F_tZ3*s_4
Mb_y(s_4) := F_L2z*(s_3max + s_4) - F_rZ3*s_4 - F_aZ3*d_w3/2
Mb_z(s_4max) = -252.171 N*m
Mb_y(s_4max) = -19.3456 N*m
Mb_z(s_4min) = -234.644 N*m
Mb_y(s_4min) = 11.3932 N*m
# Y-Z-Ebene:
Mt(s_4) := T_Vorgelege = 169.05 N*m
# Schnitt entlangs_5(negatives Schnittufer)
s_5max := 48.5*mm
s_5min := 0*mm
Mt(s_5) := 0
N_x := -F_F2x = -1.112 kN
N_x := -F_F2x = -1.112 kN
Q_y(s_5) := -F_F2y = -0.051 kN
Q_z(s_5) := -F_F2z = -1.303 kN
Mb_z(s_5) := -F_F2y*s_5
Mb_y(s_5) := F_F2z*s_5
Mb_z(s_5max) = -2.4735 N*m
Mb_y(s_5max) = 63.1955 N*m
Mb_z(s_5min) = 0 N*m
Mb_y(s_5min) = 0 N*m
# Statischer & dynamischer Festigkeitsnachweis Vorgelegewelle:
Rz := 6.3 μm
d_Kritisch2 := 35 mm
Rm := 1100 N/mm^2
Wb_2 := π/32*d_Kritisch2^3 = 4209.24 mm^3
W_t2 := π/16*d_Kritisch2^3 = 8418.49 mm^3
Mb_res2 := sqrt(Mb_z(s_3max)^2 + Mb_y(s_3max)^2)
R_p0.2N := 900 N/mm^2
# nach TB 1-1
K_t := 1 - 0.34*log(d_Kritisch2/(16 mm)) = 0.884418
# Biegung | Torsion
σ_bmax := Mb_res2/Wb_2 = 15.4432 N/mm^2
τ_tmax := T_Vorgelege/W_t2 = 20.0808 N/mm^2
σ_ba := K_A*Mb_res2/Wb_2 = 30.8864 N/mm^2
τ_ta := K_A*T_Vorgelege/W_t2 = 40.1616 N/mm^2
σ_bF := 1.2*R_p0.2N*K_t = 955.171 N/mm^2
τ_tF := 1.2*R_p0.2N*K_t/sqrt(3) = 551.468 N/mm^2
σ_bWN := 550 N/mm^2
τ_tWN := 330 N/mm^2
# aus TB 3-8 mit
# Rm =1100N/mm^2, wegen Sicherungsring
β_kb := 2.8
β_kt := 2.6
# aus TB 3-11c
K_g := 1 - 0.2*log(d_Kritisch2/(7.5 mm))/log(20) = 0.897157
K_0σ := 1 - 0.22*log(Rz/μm)*(log(Rm/(20 N/mm^2)) - 1) = 0.869804  # aus TB 3-10
K_0τ := 0.575*K_0σ + 0.425 = 0.925137
K_V := 1  # aus TB 3-12
K_Db := (β_kb/K_g + 1/K_0σ - 1)*1/K_V = 3.27065
K_Dt := (β_kt/K_g + 1/K_0τ - 1)*1/K_V = 2.97896
σ_bGW := K_t*σ_bWN/K_Db = 148.726 N/mm^2
τ_tGW := K_t*τ_tWN/K_Dt = 97.973 N/mm^2
S_F := 1/sqrt((σ_bmax/σ_bF)^2 + (τ_tmax/τ_tF)^2) = 25.0995
S_D := 1/sqrt((σ_ba/σ_bGW)^2 + (τ_ta/τ_tGW)^2) = 2.17614
# Ergebnis: Die Vorgelegewelle ist dauerfest.
# Abtriebswelle:
# Kraft- und Momentenverläufe (siehe auch Isometrie der Abtriebswelle):
# Y-Z-Ebene: | X-Y-Ebene: | X-Z-Ebene:
# Schnitt entlangs_6(positives Schnittufer)
Mt(s_6) := -T_ab
N_x := -F_B = -1.5 kN
N_x := -F_B = -1.5 kN
Q_y(s_6) := 0
Q_z(s_6) := 0
Mb_z(s_6) := 0
Mb_y(s_6) := 0
# Schnitt entlangs_7(positives Schnittufer)
s_7max := 51.65*mm
s_7min := 0*mm
Mt(s_7) := -T_ab
N_x := -F_B - F_F3x = -1.34804 kN
N_x := -F_B - F_F3x = -1.34804 kN
Q_y(s_7) := F_F3y = 3.406 kN
Q_z(s_7) := -F_F3z = -0.946953 kN
Mb_z(s_7) := F_F3y*s_7
Mb_y(s_7) := F_F3z*s_7
Mb_z(s_7max) = 175.92 N*m
Mb_y(s_7max) = 48.9101 N*m
Mb_z(s_7min) = 0 N*m
Mb_y(s_7min) = 0 N*m
# Schnitt entlangs_8(negatives Schnittufer)
s_8max := 49.35*mm
s_8min := 0*mm
Mt(s_8) := 0
N_x := 0
N_x := 0
Q_y(s_8) := -F_L3y = -3.564 kN
Q_z(s_8) := -F_L3z = -3.176 kN
Mb_z(s_8) := F_L3y*s_8
Mb_y(s_8) := -F_L3z*s_8
Mb_z(s_8max) = 175.883 N*m
Mb_y(s_8max) = -156.736 N*m
Mb_z(s_8min) = 0 N*m
Mb_y(s_8min) = 0 N*m
# Statischer & dynamischer Festigkeitsnachweis Abtriebswelle:
Rz := 6.3 μm
d_Kritisch3 := 55 mm
Rm := 1100 N/mm^2
Wb_3 := π/32*((d_Kritisch3^4 - (42 mm)^4)/d_Kritisch3) = 10779.5 mm^3
W_t3 := π/16*((d_Kritisch3^4 - (42 mm)^4)/d_Kritisch3) = 21558.9 mm^3
Mb_res3 := sqrt(Mb_z(s_8max)^2 + Mb_y(s_8max)^2)
R_p0.2N := 900 N/mm^2
# nach TB 1-1
K_t := 1 - 0.34*log(d_Kritisch3/(16 mm)) = 0.817677
# Biegung | Torsion
σ_bmax := Mb_res3/Wb_3 = 21.8551 N/mm^2
τ_tmax := T_ab/W_t3 = 23.2416 N/mm^2
σ_ba := K_A*Mb_res3/Wb_3 = 43.7103 N/mm^2
τ_ta := K_A*T_ab/W_t3 = 46.4832 N/mm^2
σ_bF := 1.2*R_p0.2N*K_t = 883.092 N/mm^2
τ_tF := 1.2*R_p0.2N*K_t/sqrt(3) = 509.853 N/mm^2
σ_bWN := 440 N/mm^2
τ_tWN := 330 N/mm^2
# aus TB 3-9b mit
# Rm =1100N/mm²
β_kb := 2.3
β_kt := 1.55  # wegen Pressverband
# aus TB 3-11c
K_g := 1 - 0.2*log(d_Kritisch3/(7.5 mm))/log(20) = 0.866982
# aus TB 3-10
K_0σ := 1 - 0.22*log(Rz/μm)*(log(Rm/(20 N/mm^2)) - 1) = 0.869804
K_0τ := 0.575*K_0σ + 0.425 = 0.925137
K_V := 1  # aus TB 3-12
K_Db := (β_kb/K_g + 1/K_0σ - 1)*1/K_V = 2.80257
K_Dt := (β_kt/K_g + 1/K_0τ - 1)*1/K_V = 1.86873
σ_bGW := K_t*σ_bWN/K_Db = 128.375 N/mm^2
τ_tGW := K_t*τ_tWN/K_Dt = 144.394 N/mm^2
S_F := 1/sqrt((σ_bmax/σ_bF)^2 + (τ_tmax/τ_tF)^2) = 19.2791
S_D := 1/sqrt((σ_ba/σ_bGW)^2 + (τ_ta/τ_tGW)^2) = 2.13412
# Ergebnis: Die Abtriebswelle ist dauerfest.
# Berechnung der Presspassung des Zahnrads der Abtriebswelle:
D_F := 61 mm
l_F := 40 mm
μ := 0.18
S_H := 2
D_Aa := 139.914 mm
F_l := 2524 N
F_t := 6970 N
F_res := sqrt(F_l^2 + F_t^2) = 7.41293 kN
F_Rres := S_H*F_res = 14.8259 kN
A_F := D_F*l_F*π
p_Fk := F_Rres/(A_F*μ) = 10.745 N/mm^2  # Erforderliche kleinste Fugenpressung
Q_A := D_F/D_Aa = 0.435982
R_e := 900 N/mm^2  # Für 42CrMo4
S_F := 1.5
2*p_Fk/(1 - Q_A^2) = 26.5336 N/mm^2
2/sqrt(3)*R_e/S_F = 692.82 N/mm^2
26.534 N/mm^2 ≤ 692.82 N/mm^2  # Werkstoff geeignet
# Kleinstes Haftmaß:
E_A := 210000 N/mm^2  # Aus TB 1-1
K := 2.5  # Aus TB 12-7
Z_k := p_Fk*D_F/E_A*K = 7.80294 μm
R_ZAi := 6.3 μm
R_ZIa := 4 μm  # Aus TB 2-12
G := 0.8*(R_ZAi + R_ZIa) = 8.24 μm
Ü_u := Z_k + G = 16.0429 μm  # Messbares kleinstes zulässiges Übermaß
p_Fg := R_e/S_F*(1 - Q_A^2)/sqrt(3) = 280.564 N/mm^2  # Größte zul. Flächenpressung des Zahnrads
p_FgI := R_e/S_F*2/sqrt(3) = 692.82 N/mm^2  # Größte zul. Flächenpressung der Welle
Z_G := p_Fg*D_F/E_A*K = 203.743 μm  # Größtes zulässiges Haftmaß
Ü_ozul := Z_G + G = 211.983 μm  # Messbares größtes zulässiges Übermaß
Ü_uzul := Z_k + G = 16.0429 μm  # Messbares kleinstes zulässiges Übermaß
# Für Passung H8/u8 für D=61mm:
EI := 0 μm
ei := 87 μm
ES := 46 μm
es := 133 μm
Ü_u := ei - ES = 41 μm
# muss größer sein als
Ü_uzul = 16.0429 μm
Ü_o := es - EI = 133 μm
# muss kleiner sein als
Ü_ozul = 211.983 μm
# Die Passung H8/u8 ist geeignet!
# Berechnung der Presspassung des Zahnrads der Vorgelegewelle:
D_F := 37 mm
l_F := 40 mm
μ := 0.18
S_H := 2
D_Aa := 138.424 mm
F_l := 793 N
F_t := 2179 N
F_res := sqrt(F_l^2 + F_t^2) = 2.31881 kN
F_Rres := S_H*F_res = 4.63762 kN
A_F := D_F*l_F*π
p_Fk := F_Rres/(A_F*μ) = 5.5413 N/mm^2  # Erforderliche kleinste Fugenpressung
Q_A := D_F/D_Aa = 0.267295
R_e := 900 N/mm^2  # Für 42CrMo4
S_F := 1.5
2*p_Fk/(1 - Q_A^2) = 11.9353 N/mm^2
2/sqrt(3)*R_e/S_F = 692.82 N/mm^2
11.935 N/mm^2 ≤ 692.82 N/mm^2  # Werkstoff geeignet
# Kleinstes Haftmaß:
E_A := 210000 N/mm^2  # Aus TB 1-1
K := 2.1  # Aus TB 12-7
Z_k := p_Fk*D_F/E_A*K = 2.05028 μm
R_ZAi := 6.3 μm
R_ZIa := 4 μm  # Aus TB 2-12
G := 0.8*(R_ZAi + R_ZIa) = 8.24 μm
Ü_u := Z_k + G = 10.2903 μm  # Messbares kleinstes zulässiges Übermaß
p_Fg := R_e/S_F*(1 - Q_A^2)/sqrt(3) = 321.66 N/mm^2  # Größte zul. Flächenpressung des Zahnrads
p_FgI := R_e/S_F*2/sqrt(3) = 692.82 N/mm^2  # Größte zul. Flächenpressung der Welle
Z_G := p_Fg*D_F/E_A*K = 119.014 μm  # Größtes zulässiges Haftmaß
Ü_ozul := Z_G + G = 127.254 μm  # Messbares größtes zulässiges Übermaß
Ü_uzul := Z_k + G = 10.2903 μm  # Messbares kleinstes zulässiges Übermaß
# Für Passung H8/u8 für D=37mm:
EI := 0 μm
ei := 60 μm
ES := 39 μm
es := 99 μm
Ü_u := ei - ES = 21 μm
# muss größer sein als
Ü_uzul = 10.2903 μm
Ü_o := es - EI = 99 μm
# muss kleiner sein als
Ü_ozul = 127.254 μm
# Die Passung H8/u8 ist geeignet!
# Schmierstoffberechnung
# Für Auslegung eines Schmierstoffes für das Getriebe muss zuerst die benötigte kinematische Nennviskosität des Schmieröles bestimmt werden. Diese erhalten wir über TB 20-7 a) mit Hilfe des Kraft-Geschwindigkeits-Faktors k_s/v. Es wird die Umfangsgeschwindigkeit und Durchmesser von Zahnrad 4 gewählt.
u := z_4/z_3
n_Abtrieb := n_Antrieb/i'_Gesamt
k_s := (3*F_tZ4/(b_4*d_4)*(u + 1)/u)*1/(π*d_4*n_Abtrieb) = 0.549761 MPa*s/m
conj(υ)
# Durch das Ablesen von TB 20-7 a) ergibt sich ca. ein Wert von:
ν_40 := 3.2*10^2*mm^2/s
# Gewähltes Schmieröl:
# DIN 51517 - CLP 320: Umlaufschmieröl auf Basis eines Mineralöls (C) mit Zusatzstoffen für erhöhten Korrosionsschutz, Alterungsbeständigkeit (L), sowie Herabsetzung der Reibung und des  Verschleißes (P).
# Geeignet für kinematische Viskositäten von ν_40 := 288 .. .352mm^2/s- ISO VG 320 (320).
