# 2-stufiges schrägverzahntes koaxiales Getriebe
# Alle im Folgenden auftretenden Angaben zu Seitenzahlen, Tabellen und Gleichungen
# beziehen sich auf "Roloff/Matek Maschinenelemente (24. Auflage)"
# Konstanten per Vorgabe
# Drehmoment Antrieb:
T_an := 50 N*m
# Drehmoment Abtrieb:
T_ab := 500 N*m
# Antriebsdrehzahl:
n_an := 2000 min^-1
# Druckkraft:
F_B := 3 kN
# Verzahnungsschrägungswinkel:
β := 20°
# Normaleingriffswinkel:
α_n := 20°
# Dauerfestigkeitsschubspannung von 42CrMo4 (Wellenstahl):
τ_tzul := 50 N/mm^2
# Überschlägiger Belastungswert:
B_zul := 4 N/mm^2
# Anwendungsfaktor:
K_A := 2
# theoretisches Übersetzungsverhältnis
i_ges := T_ab/T_an = 10
i_12 := 3.4
i_23 := i_ges/i_12 = 2.94118
i_ges := i_12*i_23 = 10
# gewählt nach TB21-11
# Ritzelzähnezahlen
z_1 := 21
z_2 := z_1*i_12 = 71.4
z_2 := 71  # orientiert an TB21-12
z_3 := 28
z_4 := z_3*i_23 = 82.3529
z_4 := 83  # Da ggT>1 wurde die Ritzelzähnezahl um +1 erhöht
# wirkliches Übersetzungsverhältnis
i_12 := z_2/z_1 = 3.38095
i_23 := z_4/z_3 = 2.96429
i_ges := i_12*i_23 = 10.0221
T_ab := T_an*i_ges = 501.105 N*m
500*N*m/T_ab = 0.997794  # Abweichung von 0,2% vom geforderten Abtriebsdrehmoment
# Durchmesser Antriebswelle
d_min1 := nthroot(16*T_an*K_A/(π*τ_tzul), 3) = 21.677 mm
d_W1 := 30 mm
# Formel nach Vereinbarung
# Durchmesser Vorlegewelle
d_min2 := nthroot(16*T_an*i_12*K_A/(π*τ_tzul), 3) = 32.5347 mm
d_W2 := 40 mm
# Formel nach Vereinbarung
# Durchmesser Abtriebswelle
d_min3 := nthroot(16*T_an*i_ges*K_A/(π*τ_tzul), 3) = 46.7362 mm
d_W3 := 55 mm
# Formel nach Vereinbarung
# gewählt aufgrund von Passfededer-/ & Lagerabmaßen (TB12-2)
# Modul 1;2
m_n12 := 1.8*d_W1*cos(β)/(z_1 - 2.5) = 2.74289 mm
m_n12 := 3 mm  # Gl21.36
# orientiert an TB21-1
# Zahnradbreite
b_1 := 2*T_an/(d_W1^2*B_zul) = 27.7778 mm
b_1 := 30 mm  # Formel nach Vereinbarung
# orientiert an TB21-13b
b_2 := b_1
b_3 := 2*T_an*i_12/(d_W2^2*B_zul) = 52.8274 mm
b_3 := 55 mm  # Formel nach Vereinbarung
# orientiert an TB21-13b
b_4 := b_3
# Teilkreis 1 & 2
d_T1 := z_1*m_n12/cos(β) = 67.0432 mm
d_T2 := z_2*m_n12/cos(β) = 226.67 mm
# Gl21.38
# Achsabstand 1;2
a_d12 := (d_T1 + d_T2)/2 = 146.857 mm
# Gl21.42
# Modul 3;4
m_n34 := 2*a_d12*cos(β)/((1 + i_23)*z_3) = 2.48649 mm
m_n34 := 2.5 mm  # Gl21.64
# orientiert an TB21-1
# Teilkreis 3 & 4
d_T3 := z_3*m_n34/cos(β) = 74.4924 mm
d_T4 := z_4*m_n34/cos(β) = 220.817 mm
# Gl.21.38
# Achsabstand 3;4
a_d34 := (d_T3 + d_T4)/2 = 147.655 mm
a_d12 ≠ a_ad34
a_d12 - a_d34 = -0.798133 mm
# Gl.21.42
# Fazit: Es ist eine Profilverschiebung notwendig, um die Differenz der Achsabstände auszugleichen! Es wird eine positive Profilverschiebung gewählt, um den Zahnfuß zu stärken und die Tragfähigkeit der Zähne zu erhöhen.
# Stirneingreifswinkel
α_t := atan(tan(α_n)/cos(β)) = 21.1728°  # Gl. 21.35
# Betriebseingriffswinkel
α_w := acos(cos(α_t)*a_d12/a_d34) = 21.9585°  # Gl. 21.31
# Summe Profilverschiebungsfaktoren
invα_w := tan(α_w) - α_w*π/(180°) = 0.0199359
invα_t := tan(α_t) - α_t*π/(180°) = 0.0177934
Σx := (invα_w - invα_t)/(2*tan(α_n))*(z_1 + z_2) = 0.270781
# Gl. 21.56
# Ersatzzähnezahlen
β_b := acos(cos(β)*cos(α_n)/cos(α_t)) = 18.7472°
# Gl. 21.36
cos(β_b)^2 = 0.896706
# vgl. mit Additionstheorem
xyz := 1/2*(1 + cos(2*β_b)) = 0.896706
z_n1 := z_1/(cos(β_b)^2*cos(β)) = 24.922
z_n2 := z_2/(cos(β_b)^2*cos(β)) = 84.2602
# Gl. 21.47
# sinnvolle Wahl von x
x_1 := Σx/2 + (1/2 - Σx/2)*log(z_2/z_1)/log(z_n1*z_n2/100) = 0.281278
# Gl. 21.33
x_2 := Σx - x_1 = -0.0104963
# Beide Räder nach TB 21-3 ausführbar! | Gl. 21.56
# Verschiebungen
V_1 := x_1*m_n12 = 0.843833 mm
V_2 := x_2*m_n12 = -0.0314889 mm
V_3 := 0 mm
V_4 := 0 mm
# Gl. 21.49
# Kontrolle Achsabstand
# Betriebswälzkreisdurchmesser:
d_w1 := d_T1*cos(α_t)/cos(α_w) = 67.4076 mm
d_w2 := d_T2*cos(α_t)/cos(α_w) = 227.902 mm
# Gl. 21.22a
a := (d_w1 + d_w2)/2 = 147.655 mm
# vgl.:
a_d34 = 147.655 mm
# Kopfspiel Soll
c_12Soll := 0.25*m_n12 = 0.75 mm
c_34 := 0.25*m_n34 = 0.625 mm
# vgl. S. 794
# Kopfhöhenänderung:
k := a - a_d12 - m_n12*(x_1 + x_2) = -0.0142105 mm
# Gl.21-23
# Zahnräder
# Zahnrad Nr.1:
d_T1 = 67.0432 mm
# Betriebswälzkreisdurchmesser:
d_w1 := 2*z_1/(z_1 + z_2)*a = 67.4076 mm  # Gl.21-22a
# Grundkreisdurchmesser:
d_b1 := z_1*m_n12*cos(α_t)/cos(β) = 62.5175 mm  # Gl.21-39
# Kopfkreisdurchmesser:
d_a1 := d_T1 + 2*(m_n12 + V_1 + k) = 74.7024 mm  # Gl.21-24
# Fußkreisdurchmesser:
d_f1 := d_T1 - 2*((m_n12 + c_12Soll) - V_1) = 61.2309 mm  # Gl.21-25
# Zahnrad Nr.2:
d_T2 = 226.67 mm
d_w2 := 2*z_2/(z_1 + z_2)*a = 227.902 mm
# Gl.21-22b
d_b2 := z_2*m_n12*cos(α_t)/cos(β) = 211.369 mm  # Gl.21-39
d_a2 := d_T2 + 2*(m_n12 + V_2 + k) = 232.578 mm  # Gl.21-24
d_f2 := d_T2 - 2*((m_n12 + c_12Soll) - V_2) = 219.107 mm  # Gl.21-25
# Zahnrad Nr.3:
d_T3 = 74.4924 mm
d_w3 := 2*z_3/(z_3 + z_4)*a = 74.4924 mm
# Gl.21-22a
d_b3 := z_3*m_n34*cos(α_t)/cos(β) = 69.4638 mm  # Gl.21-39
d_a3 := d_T3 + 2*(m_n34 + V_2 + k) = 79.401 mm  # Gl.21-40
d_f3 := d_T3 - 2.5*m_n34 = 68.2424 mm  # Gl.21-41
# Zahnrad Nr.4:
d_T4 = 220.817 mm
d_w3 := 2*z_4/(z_3 + z_4)*a = 220.817 mm
# Gl.21-22b
d_b4 := z_4*m_n34*cos(α_t)/cos(β) = 205.911 mm
# Gl.21-39
d_a4 := d_T4 + 2*(m_n34 + V_2 + k) = 225.725 mm
# Gl.21-40
d_f4 := d_T4 - 2.5*m_n34 = 214.567 mm
# Gl.21-41
# Kopfspiel nach Profilverschiebung
c_12Ist := a - 0.5*(d_a1 + d_f2) = 0.75 mm
c_12Soll - c_12Ist = -6.50521e-16 mm
# Keine relevante Abweichung! | vgl. S. 794
# Stirnmodul
m_t12 := m_n12/cos(β) = 3.19253 mm
m_t34 := m_n34/cos(β) = 2.66044 mm  # Gl.21-23
# Profilüberdeckung
ε_α12 := (0.5*(sqrt(d_a1^2 - d_b1^2) + z_2/|z_2|*sqrt(d_a2^2 - d_b2^2)) - a*sin(α_w))/(π*m_t12*cos(α_t)) = 1.47019
# Gl.21-57
# Laut S.787 ist der Wert für ε_α gut.
ε_β12 := b_1*sin(β)/(π*m_n12) = 1.08868
# Gl.21-44
# Gesamt:
ε_γ12 := ε_α12 + ε_β12 = 2.55887
ε_α34 := (0.5*(sqrt(d_a3^2 - d_b3^2) + z_4/|z_4|*sqrt(d_a4^2 - d_b4^2)) - a*sin(α_w))/(π*m_t34*cos(α_t)) = 1.31619
# Gl.21-57
# Laut S.787 ist der Wert für ε_α gut.
ε_β34 := b_3*sin(β)/(π*m_n34) = 2.3951
Zahnrad_1 := 1
Zahnrad_2 := 1
# Gl.21-44
Zahnrad_3 := 1
Zahnrad_4 := 1
# Gesamt:
ε_γ34 := ε_α34 + ε_β34 = 3.71129
# Zusammenfassung
table  # each column defines a variable
    Nr. | d (mm) | d_b (mm) | d_a (mm) | d_f (mm) | d_w (mm) | b (mm) | m (mm) | V (mm) | z
    Zahnrad_1 | 67.04 | 62.52 | 74.78 | 61.196 | 67.41 | 30 | 3 | 0.844 | 21
    Zahnrad_2 | 226.67 | 211.37 | 232.61 | 219.032 | 227.66 | 30 | 3 | -0.031 | 71
    Zahnrad_3 | 74.49 | 69.46 | 79.49 | 68.24 | 74.49 | 55 | 2.5 | 0 | 28
    Zahnrad_4 | 220.82 | 205.92 | 225.82 | 214.57 | 220.82 | 55 | 2.5 | 0 | 83
end table
# Passfederverbindungen | TB 12-2
# Material der Passfeder: E295
R_e := 295*N/mm^2
S_F := 1.1
η_zul := R_e/S_F = 268.182 N/mm^2
φ := 1
n := 1
l_tr1 := 2*T_an/(d_W1*3 mm*η_zul*φ*n) = 4.14313 mm
b := 8 mm
l_tr1 + b = 12.1431 mm
# Antriebswelle: Passfeder DIN 6885 - A8x7x14
l_tr2 := 2*T_an*i_12/(d_W2*3 mm*η_zul*φ*n) = 10.5058 mm
b := 12 mm
l_tr2 + b = 22.5058 mm
# Vorlegewelle: Passfeder DIN 6885 - A12x8x25
l_tr3 := 2*T_an*i_12*i_23/(d_W3*4 mm*η_zul*φ*n) = 16.9866 mm
b := 16 mm
l_tr3 + b = 32.9866 mm
# Abtriebswelle: Passfeder DIN 6885 - A16x10x36
# Gl12.1
# Kräfte an den Zahnrädern
# Zahnrad 1:
# Umfangskraft:
F_t1 := 2*T_an/d_T1 = 1.49158 kN  # Gl.21.70
# Radialkraft:
F_R1 := F_t1*tan(α_n)/cos(β) = 0.577731 kN  # Gl.21.71
# Axialkraft:
F_a1 := F_t1*tan(β) = 0.542889 kN  # Gl.21.72
# Zahnrad 2:
# Umfangskraft:
F_t2 := |F_t1| = 1.49158 kN
# Radialkraft:
F_R2 := |F_R1| = 0.577731 kN
# Axialkraft:
F_a2 := |F_a1| = 0.542889 kN
# Zahnrad 3:
# Umfangskraft:
F_t3 := 2*T_an*i_12/d_T3 = 4.53865 kN
# Radialkraft:
F_R3 := F_t3*tan(α_n)/cos(β) = 1.75795 kN
# Axialkraft:
F_a3 := F_t3*tan(β) = 1.65193 kN
# Zahnrad 4:
# Umfangskraft:
F_t4 := |F_t3| = 4.53865 kN
# Radialkraft:
F_R4 := |F_R3| = 1.75795 kN
# Axialkraft:
F_a4 := |F_a3| = 1.65193 kN
# Es werden hier nur die Beträge der Kräfte aufgeführt, die Orientierungen der Kräfte werden in den Berechnungen der Lagerkräfte passend (d.h entgegengesetzt) angenommen (siehe Freischnitte & Schnittverläufe der drei Wellen).
# Lagerkräfte Antriebswelle
# Freischnitt der Antriebswelle:
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# X_1 | X_2
# Wirkabstände:
X_1 := 33 mm
X_2 := 26.5 mm
B_Y1 := (F_R1*X_1 + F_a1*d_T1/2)/(X_1 + X_2) = 0.626279 kN
B_Z1 := F_t1*X_1/(X_1 + X_2) = 0.82726 kN
A_Y1 := F_R1 - B_Y1 = -0.0485488 kN
A_Z1 := F_t1 - B_Z1 = 0.664315 kN
A_R1 := sqrt(A_Y1^2 + A_Z1^2) = 0.666087 kN
B_R1 := sqrt(B_Y1^2 + B_Z1^2) = 1.03759 kN
A_R1 < B_R1  # A ist das Festlager aufgrund der kleineren radialen Belastung
A_X1 := -F_a1 = -0.542889 kN
B_X1 := 0 kN
# Schnittgrößenverläufe Antriebswelle
# Berechnung für XY-Ebene:
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s_1max := X_1 = 33 mm
s_1min := 0 mm
s_2max := X_2 = 26.5 mm
s_2min := 0 mm
s_1 := 123 mm  # ;Wert erfunden da irrelevant
s_2 := 123 mm  # ;Wert erfunden da irrelevant
# positives Schnittufer:
F_N := -A_X1 = 0.542889 kN
F_QY := A_Y1 = -0.0485488 kN
M_BZ(x) := A_Y1*s_1
M_BZmin(x) := A_Y1*s_1min = 0 N·m
M_BZmax(x) := A_Y1*s_1max = -1.60211 N·m
M_BZmax := A_Y1*s_1max = -1.60211 N·m
# negatives Schnittufer:
F_N := 0
F_QY := -B_Y1 = -0.626279 kN
M_BZ(x) := B_Y1*s_2
M_BZmin(x) := B_Y1*s_2min = 0 N·m
M_BZmax(x) := B_Y1*s_2max = 16.5964 N·m
M_BZmax := B_Y1*s_2max = 16.5964 N·m
# Berechnung für XZ-Ebene:
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# positives Schnittufer:
F_QZ := A_Z1 = 0.664315 kN
M_BY(x) := A_Z1*s_1
M_BYmin(x) := A_Z1*s_1min = 0 N*m
M_BYmax(x) := A_Z1*s_1max = 21.9224 N*m
M_BYmax := A_Z1*s_1max = 21.9224 N*m
# negatives Schnittufer:
F_QZ := -B_Z1 = -0.82726 kN
M_BY(x) := B_Z1*s_1
M_BYmin(x) := B_Z1*s_2min = 0 N*m
M_BYmax(x) := B_Z1*s_2max = 21.9224 N*m
M_BYmax := B_Z1*s_2max = 21.9224 N*m
M_Bmax1 := sqrt(M_BYmax^2 + M_BZmax^2) = 27.496 N*m
# mit
M_BYmax = 21.9224 N*m
# und
M_BZmax = 16.5964 N*m
# Der Maximalwert wurde hier entsprechend der Schwachstelle der Welle (mit einem pinken "X" in der Isometrie-Ansicht markiert) für die folgende Festigkeitsberechnung ermittelt
# Lagerkräfte Vorgelegewelle
# Freischnitt Vorgelegewelle:
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# X_3 | X_4 | X_5
# Wirkabstände:
X_3 := 36.5 mm
X_4 := 33 mm
X_5 := 49 mm
B_Y2 := (F_R2*X_3 + F_a2*d_T2/2 - F_R3*(X_4 + X_5) - F_a3*d_T3/2)/X_4 = -3.72924 kN
A_Y2 := -F_R2 - B_Y2 - F_R3 = 1.39356 kN
B_Z2 := (F_t2*X_3 - F_t3*(X_4 + X_5))/X_4 = -9.62809 kN
A_Z2 := -F_t2 - B_Z2 - F_t3 = 3.59786 kN
A_R2 := sqrt(A_Y2^2 + A_Z2^2) = 3.85832 kN
B_R2 := sqrt(B_Y2^2 + B_Z2^2) = 10.3251 kN
A_R2 < B_R2  # A ist das Festlager aufgrund der kleineren radialen Belastung
A_X2 := F_a3 - F_a2 = 1.10904 kN
B_X2 := 0 kN
# Schnittgrößenverläufe Vorgelegewelle
s_3max := X_3 = 36.5 mm
s_3min := 0*mm
s_4max := X_4 = 33 mm
s_4min := 0 mm
s_5max := X_5 = 49 mm
s_5min := 0 mm
# Berechnung für XZ-Ebene:
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# 1. positives Schnittufer:
F_N := F_a2 = 0.542889 kN
s_3 := 0*mm  # ;Wert erfunden da irrelevant
F_QY := -F_R2 = -0.577731 kN
M_BZ(x) := -F_R2*s_3 - F_a2*d_T2/2
M_BZmin(x) := -F_R2*s_3min - F_a2*d_T2/2 = -61.5283 N*m
M_BZmax(x) := -F_R2*s_3max - F_a2*d_T2/2 = -82.6155 N*m
# 2. positives Schnittufer:
F_N := F_a2 - A_X2 = -0.566156 kN
F_QY := -F_R2 - A_Y2 = -1.97129 kN
s_4 := 0 mm  # ;Wert erfunden da irrelevant
M_BZ(x) := F_R2*(s_3 + s_4) - A_Y2*s_3 - F_a2*d_T2/2
M_BZmin(x) := F_R2*(s_3max + s_4min) - A_Y2*s_3max - F_a2*d_T2/2 = -91.3059 N*m
M_BZmax(x) := F_R2*(s_3max + s_4max) - A_Y2*s_3max - F_a2*d_T2/2 = -72.2408 N*m
# 1. negatives Schnittufer:
F_N := F_a3 = 1.65193 kN
s_5 := 0 mm  # ;Wert erfunden da irrelevant
F_QY := F_R3 = 1.75795 kN
M_BZ(x) := -F_R3*s_5 - F_a3*d_T3/2 = -61.5283 N*m
M_BZmin(x) := -F_R3*s_5min - F_a3*d_T3/2 = -61.5283 N*m
M_BZmax(x) := -F_R3*s_5max - F_a3*d_T3/2 = -147.668 N*m
M_BZmax := -F_R3*s_5max - F_a3*d_T3/2 = -147.668 N*m
# Berechnung der XZ-Ebene:
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# 1. positives Schnittufer:
F_QZ := -F_t2 = -1.49158 kN
M_BY(x) := -F_t2*s_3
M_BYmin(x) := -F_t2*s_3min = 0 N*m
M_BYmax(x) := -F_t2*s_3max = -54.4425 N*m
# 2. positives Schnittufer:
F_QZ := A_Z2 - F_t2 = 2.10629 kN
M_BY(x) := -F_t2*(s_3 + s_4) + A_Z2*s_4
M_BYmin(x) := -F_t2*(s_3max + s_4min) + A_Z2*s_4min = -54.4425 N*m
M_BYmax(x) := -F_t2*(s_3max + s_4max) + A_Z2*s_4max = 15.0649 N*m
# 1. negatives Schnittufer:
F_QZ := -F_t3 = -4.53865 kN
M_BY(x) := -F_t3*s_5
M_BYmin(x) := -F_t3*s_5min = 0 N*m
M_BYmin(x) := -F_t3*s_5max = -222.394 N*m
M_BYmax := -F_t3*s_5max = -222.394 N*m
M_Bmax2 := sqrt(M_BYmax^2 + M_BZmax^2) = 266.955 N*m
# mit
M_BYmax = -222.394 N*m
# und
M_BZmax = -147.668 N*m
# Der Maximalwert wurde hier entsprechend der Schwachstelle der Welle (mit einem pinken "X" in der Isometrie-Ansicht markiert) für die folgende Festigkeitsberechnung ermittelt
# Lagerkräfte Abtriebswelle
# Freischnitt Abtriebswelle:
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# X_6 | X_7
# Wirkabstände:
X_6 := 41.5 mm
X_7 := 52 mm
B_Y3 := (F_R4*X_6 - F_a4*d_T4/2)/(X_6 + X_7) = -1.1704 kN
B_Z3 := F_t4*X_6/(X_6 + X_7) = 2.01448 kN
A_Y3 := F_R4 - B_Y3 = 2.92835 kN
A_Z3 := F_t4 - B_Z3 = 2.52417 kN
A_R3 := sqrt(A_Y3^2 + A_Z3^2) = 3.86609 kN
B_R3 := sqrt(B_Y3^2 + B_Z3^2) = 2.3298 kN
A_R3 > B_R3  # B ist das Festlager aufgrund der kleineren radialen Belastung
B_X3 := F_a4 + F_B = 4.65193 kN
A_X3 := 0 kN
# Schnittgrößenverläufe Abtriebswelle
# Berechnung der XY-Ebene:
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s_6max := X_6 = 41.5 mm
s_6min := 0 mm
s_7max := X_7 = 52 mm
s_7min := 0 mm
s_6 := 123 mm  # Wert erfunden da irrelevant
s_7 := 123 mm
# positives Schnittufer:
F_N := 0
F_QY := A_Y3 = 2.92835 kN
M_BZ(x) := A_Y3*s_6
M_BZmin(x) := A_Y3*s_6min = 0 N·m
M_BZmax(x) := A_Y3*s_6max = 121.527 N·m
M_BZmax := A_Y3*s_6max = 121.527 N·m
# negatives Schnittufer:
F_N := B_X3 - F_B = 1.65193 kN
F_QY := -B_Y3 = 1.1704 kN
M_BZ(x) := B_Y3*s_7
M_BZmin(x) := B_Y3*s_7min = 0 N·m
M_BZmax(x) := B_Y3*s_7max = -60.8608 N·m
M_BZmax := B_Y3*s_7max = -60.8608 N·m
# Berechnung der XZ-Ebene:
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# positives Schnittufer:
F_QZ := A_Z3 = 2.52417 kN
M_BY(x) := A_Z3*s_6
M_BYmin(x) := A_Z3*s_6min = 0 N*m
M_BYmax(x) := A_Z3*s_6max = 104.753 N*m
M_BYmax := A_Z3*s_6max = 104.753 N*m
# negatives Schnittufer:
F_QZ := -B_Z3 = -2.01448 kN
M_BY(x) := B_Z3*s_7
M_BYmin(x) := B_Z3*s_7min = 0 N*m
M_BYmax(x) := B_Z3*s_7max = 104.753 N*m
M_BYmax := B_Z3*s_7max = 104.753 N*m
M_Bmax3 := sqrt(M_BYmax^2 + M_BZmax^2) = 121.15 N*m
# mit
M_BYmax = 104.753 N*m
# und
M_BZmax = -60.8608 N*m
# Der Maximalwert wurde hier entsprechend der Schwachstelle der Welle (mit einem pinken "X" in der Isometrie-Ansicht markiert) für die folgende Festigkeitsberechnung ermittelt
# Vorauswahl Lagergrößen Antriebswelle
ν_1 := 3  # aufgrund von Rillenkugellager
n_1 := 2000*1/min
d_W1 = 30 mm
# Loslager | Festlager
P_1L := |B_R1| = 1.03759 kN
P_1F := 1.5 kN
c_erf := P_1L*nthroot(n_1*10000*hr/10^6, ν_1) = 11.026 kN
c_erf := P_1F*nthroot(n_1*10000*hr/10^6, ν_1) = 15.9399 kN
# gewählt: 6006 | gewählt: 6206
# Berechnung Lagerlebensdauer Antriebswelle
c_6006 := 13.8 kN
c_6206 := 20.3 kN
c_0.6206 := 11.2 kN
l_10h;6006 := 10^6/n_1*(c_6006/P_1L)^ν_1 = 19605.7 hr
|A_X1|/A_R1 = 0.815043
|A_X1|/c_0.6206 = 0.0484722
# Gl. 14.5a
# nach TB 14-3A
0.794 > e
# d.h.
X_1F := 0.56
Y_1F := 1.8
P_6206 := X_1F*A_R1 + Y_1F*|A_X1| = 1.35021 kN
l_10h;6206 := 10^6/n_1*(c_6206/P_6206)^ν_1 = 28320.7 hr
# Vorauswahl Lagergrößen Vorgelegewelle
n_2 := 2000*1/min/i_12 = 591.549 1/min
d_W2 = 40 mm
# Loslager | Festlager
P_2L := 11.269 kN
P_2F := 10 kN
c_erf := P_2L*nthroot(n_2*10000*hr/10^6, ν_1) = 79.7871 kN
c_erf := P_2F*nthroot(n_2*10000*hr/10^6, ν_1) = 70.8023 kN
# gewählt: NU 308 | gewählt: NUP 308
# Berechnung Lagerlebensdauer Vorgelegewelle
ν_2 := 10/3  # aufgrund von Rollenlager
c_NU308 := 93 kN
c_NUP308 := 93 kN
l_10h;NU308 := 10^6/n_2*(c_NU308/P_2L)^ν_2 = 32002.4 hr
A_X2/A_R2 = 0.287443
# Gl. 14.5a
# nach TB 14-3A
0.079 < e
# d.h.
X_NUP308 := 1
Y_NUP308 := 0
P_NUP308 := X_NUP308*A_R2 + Y_NUP308*A_X2
P_NUP308 = 3.85832 kN
l_10h1F := 10^6/n_1*(c_6206/P_6206)^ν_2 = 69898.7 hr
# Vorauswahl Lagergrößen Abtriebswelle
n_3 := 2000*1/min/i_ges = 199.559 1/min
d_W3 = 55 mm
# Loslager | Festlager
P_3L := A_R3 = 3.86609 kN
P_3F := 10 kN
c_erf := P_3L*nthroot(n_3*10000*hr/10^6, ν_1) = 19.0552 kN
c_erf := P_3F*nthroot(n_3*10000*hr/10^6, ν_1) = 49.2879 kN
# gewählt: 6011 | gewählt: 6311
# Berechnung Lagerlebensdauer Abtriebswelle
c_6011 := 29.6 kN
c_6311 := 74.1 kN
c_0;6311 := 45 kN
l_10h;6011 := 10^6/n_3*(c_6011/P_3L)^ν_1 = 37483.1 hr
B_X3/B_R3 = 1.99671
B_X3/c_0;6311 = 0.103376
# Gl. 14.5a
# nach TB 14-3A
1.879 > e
# d.h.
X_6311 := 0.56
Y_6311 := 1.4
P_6311 := X_6311*B_R3 + Y_6311*B_X3 = 7.8174 kN
l_10h1F := 10^6/n_3*(c_6311/P_6311)^ν_1 = 71128.9 hr
NU308 := 1
NUP308 := 1
Antriebswelle := 01
Vorgelegewelle := 02
Abtriebswelle := 03
# Übersicht der gewählten Lager
table  # each column defines a variable
    Welle | Loslager | Lebensdauer (hr) | Festlager | Lebensdauer (hr)
    Antriebswelle | 6006 | 19606 | 6206 | 28321
    Vorgelegewelle | NU308 | 32002 | NUP308 | 69899
    Abtriebswelle | 6011 | 37483 | 6311 | 71129
    □ | □ | □ | □ | □
    □ | □ | □ | □ | □
end table
# Festigkeitsnachweise
# Material der Wellen: 42CrMo4
R_m := 1100 N/mm^2
R_p0.2 := 900 N/mm^2
R_z := 6 μm
σ_bWN := 550 N/mm^2
τ_tWN := 330 N/mm^2
# Einflussfaktoren (gelten für alle drei Wellen gleich):
# Oberflächenverfestigung:
K_V := 1.2
# TB 3-12
# Oberflächenrauheit:
K_Oσ := 1 - 0.22*log(R_z/(1 μm))*(log(R_m/(20 N/mm^2)) - 1) = 0.873255
K_Oτ := 0.575*K_Oσ + 0.425 = 0.927122
# TB 3-10
# Antriebswelle
d_W1 = 30 mm  # Aufgrund der Passfederverbindung wird der Querschnitt der Antriebswelle aufgrund der Kerbwirkung geschwächt
t_1;W1 := 4 mm
d_1 := d_W1 - t_1;W1 = 26 mm
# Schwachstelle der Antriebswelle befindet sich beim Zahnrad_1 (mit "Pinker"-Farbe in der Isometrie-Darstellung markiert)
# Statischer Festigkeitsnachweis | nach Bild 3.30
# vorhandene Spannungen:
W_B1 := 0.012*(d_W1 + d_1)^3 = 2107.39 mm^3
W_T1 := 0.2*d_1^3 = 3515.2 mm^3
M_Bmax1 = 27.496 N*m
M_tmax1 := 50 N·m
σ_bmax1 := M_Bmax1/W_B1 = 13.0474 N/mm^2
τ_tmax1 := M_tmax1/W_T1 = 14.2239 N/mm^2
# Technologischer Größeneinflussfaktor:
K_t1 := 1 - 0.26*log(d_1/(16 mm)) = 0.945178
# TB 3-11a
# Bauteilfestigkeit:
σ_bF1 := 1.2*R_p0.2*K_t1 = 1020.79 N/mm^2
τ_TF1 := 1.2*R_p0.2*K_t1/sqrt(3) = 589.355 N/mm^2
# Gesamtsicherheit:
S_F1 := 1/sqrt((σ_bmax1/σ_bF1)^2 + (τ_tmax1/τ_TF1)^2) = 36.6161
S_F1 > S_Fmin  # Die Antriebswelle ist statisch fest
# mit
S_Fmin := 2  # nach TB3-14b
# Dynamischer Festigkeitsnachweis
# vorhandene Spannungen:
σ_ba1 := K_A*M_Bmax1/W_B1 = 26.0949 N/mm^2
τ_ta1 := K_A*M_tmax1/W_T1 = 28.4479 N/mm^2
σ_bm1 := 0 N/mm^2
τ_tm1 := 0 N/mm^2
# vereinfachte Berechnung siehe S.73
# Einflussfaktoren:
# Technologischer Größeneinflussfaktor:
K_T1 := 1 - 0.26*log(d_1/(16 mm)) = 0.945178
# Kerbwirkungszahl:
β_KB1 := 2.5  # TB 3-09b
β_KT1 := 2.3
# Geometrische Größeneinflussfaktor:
K_G1 := 1 - 0.2*log(d_1/(7.5 mm))/log(20) = 0.917002
# TB 3-11c
# Gesamteinflussfaktor/Konstruktionsfaktor:
K_DT1 := (β_KT1/K_G1 + 1/K_Oτ - 1)*1/K_V = 2.15565
K_DB1 := (β_KB1/K_G1 + 1/K_Oσ - 1)*1/K_V = 2.39285
# Gl. 3.16
# Gestaltwechselfestigkeit:
σ_bGW1 := K_T1*σ_bWN/K_DB1 = 217.251 N/mm^2
τ_tGW1 := K_T1*τ_tWN/K_DT1 = 144.694 N/mm^2
# Gesamtsicherheit:
S_D1 := 1/sqrt((σ_ba1/σ_bGW1)^2 + (τ_ta1/τ_tGW1)^2) = 4.34037
S_D_erf := 1.5
S_D1 > S_D_erf  # Die Antriebswelle ist dauerfest
# Vorgelegewelle
d_W2 := 40 mm
t_1;W2 := 2.5 mm
d_2 := d_W2 - t_1;W2 = 37.5 mm
# Schwachstelle der Vorgelegewelle befindet sich beim Loslager (mit "Pinker"-Farbe in der Isometrie-Darstellung markiert)
# Statischer Festigkeitsnachweis | nach Bild 3.30
# vorhandene Spannungen:
W_B2 := π/32*d_W2^3 = 6283.19 mm^3
W_T2 := π/16*d_W2^3 = 12566.4 mm^3
M_Bmax2 = 266.955 N*m
M_tmax2 := 50 N·m*i_12 = 169.048 N*m
σ_bmax2 := M_Bmax2/W_B2 = 42.4872 N/mm^2
τ_tmax2 := M_tmax2/W_T2 = 13.4524 N/mm^2
# Technologischer Größeneinflussfaktor:
K_t2 := 1 - 0.26*log(d_2/(16 mm)) = 0.903823
# TB 3-11a
# Bauteilfestigkeit:
σ_bF2 := 1.2*R_p0.2*K_t2 = 976.129 N/mm^2
τ_TF2 := 1.2*R_p0.2*K_t2/sqrt(3) = 563.568 N/mm^2
# Gesamtsicherheit:
S_F2 := 1/sqrt((σ_bmax2/σ_bF2)^2 + (τ_tmax2/τ_TF2)^2) = 20.1443
S_F2 > S_Fmin  # Die Antriebswelle ist statisch fest
# mit
S_Fmin := 2  # nach TB3-14b
# Dynamischer Festigkeitsnachweis
# vorhandene Spannungen:
σ_ba2 := K_A*M_Bmax2/W_B2 = 84.9744 N/mm^2
τ_ta2 := K_A*M_tmax2/W_T2 = 26.9048 N/mm^2
σ_bm2 := 0 N/mm^2
τ_tm2 := 0 N/mm^2
# vereinfachte Berechnung siehe S.73
# Einflussfaktoren:
# Technologischer Größeneinflussfaktor:
K_T2 := 1 - 0.26*log(d_2/(16 mm)) = 0.903823
# Kerbwirkungszahl:
β_KB2 := 2.9
β_KT2 := 1.9
# TB 3-09b
# Geometrische Größeneinflussfaktor:
K_G2 := 1 - 0.2*log(d_2/(7.5 mm))/log(20) = 0.892551
# Gesamteinflussfaktor/Konstruktionsfaktor: | TB 3-11c
K_DT2 := (β_KT2/K_G2 + 1/K_Oτ - 1)*1/K_V = 1.83945
K_DB2 := (β_KB2/K_G2 + 1/K_Oσ - 1)*1/K_V = 2.82855
# Gl. 3.16
# Gestaltwechselfestigkeit:
σ_bGW2 := K_T2*σ_bWN/K_DB2 = 175.745 N/mm^2
τ_tGW2 := K_T2*τ_tWN/K_DT2 = 162.147 N/mm^2
# Gesamtsicherheit:
S_D2 := 1/sqrt((σ_ba2/σ_bGW2)^2 + (τ_ta2/τ_tGW2)^2) = 1.95623
S_D_erf := 1.5
S_D2 > S_D_erf  # Die Vorgelegewelle ist dauerfest
# Abtriebswelle
d_W3 = 55 mm  # Aufgrund der Passfederverbindung wird der Querschnitt der Antriebswelle aufgrund der Kerbwirkung geschwächt
t_1;W3 := 6 mm
d_3 := d_W3 - t_1;W3 = 49 mm
# Schwachstelle der Abtriebswelle befindet sich beim Zahnrad_4 (mit "Pinker"-Farbe in der Isometrie-Darstellung markiert)
# Statischer Festigkeitsnachweis | nach Bild 3.30
# vorhandene Spannungen:
W_B3 := 0.012*(d_W3 + d_3)^3 = 13498.4 mm^3
W_T3 := 0.2*d_3^3 = 23529.8 mm^3
M_Bmax3 = 121.15 N*m
M_tmax3 := 50 N·m*i_ges = 501.105 N*m
σ_bmax3 := M_Bmax3/W_B3 = 8.97513 N/mm^2
τ_tmax3 := M_tmax3/W_T3 = 21.2966 N/mm^2
# Technologischer Größeneinflussfaktor:
K_t3 := 1 - 0.26*log(d_3/(16 mm)) = 0.87362
# TB 3-11a
# Bauteilfestigkeit:
σ_bF3 := 1.2*R_p0.2*K_t3 = 943.51 N/mm^2
τ_TF3 := 1.2*R_p0.2*K_t3/sqrt(3) = 544.736 N/mm^2
# Gesamtsicherheit:
S_F3 := 1/sqrt((σ_bmax3/σ_bF3)^2 + (τ_tmax3/τ_TF3)^2) = 24.8534
S_F3 > S_Fmin  # Die Antriebswelle ist statisch fest
# mit
S_Fmin := 2  # nach TB3-14b
# Dynamischer Festigkeitsnachweis
# vorhandene Spannungen:
σ_ba3 := K_A*M_Bmax3/W_B3 = 17.9503 N/mm^2
τ_ta3 := K_A*M_tmax3/W_T3 = 42.5933 N/mm^2
σ_bm3 := 0 N/mm^2
τ_tm3 := 0 N/mm^2
# vereinfachte Berechnung siehe S.73
# Einflussfaktoren:
# Technologischer Größeneinflussfaktor:
K_T3 := 1 - 0.26*log(d_3/(16 mm)) = 0.87362
# Kerbwirkungszahl:
β_KB3 := 2.5  # TB 3-09b
β_KT3 := 2.3
# Geometrische Größeneinflussfaktor:
K_G3 := 1 - 0.2*log(d_3/(7.5 mm))/log(20) = 0.874694
# TB 3-11c
# Gesamteinflussfaktor/Konstruktionsfaktor:
K_DT3 := (β_KT3/K_G3 + 1/K_Oτ - 1)*1/K_V = 2.25675
K_DB3 := (β_KB3/K_G3 + 1/K_Oσ - 1)*1/K_V = 2.50274
# Gl. 3.16
# Gestaltwechselfestigkeit:
σ_bGW3 := K_T3*σ_bWN/K_DB3 = 191.986 N/mm^2
τ_tGW3 := K_T3*τ_tWN/K_DT3 = 127.748 N/mm^2
# Gesamtsicherheit:
S_D3 := 1/sqrt((σ_ba3/σ_bGW3)^2 + (τ_ta3/τ_tGW3)^2) = 2.88785
S_D_erf := 1.5
S_D3 > S_D_erf  # Die Abtriebswelle ist dauerfest
# Fliehkraftkupplung
# Anzahl der Fliehkörper:
N_FK := 2
# Schaltdrehzahl:
n_S := 1400*1/min
# Fliehkörpermasse:
m_FK := 0.5 kg
# Reibdurchmesser:
D_R := 140 mm
# Haftreibwert:
μ_0;FK := 0.9
# Fliehkörperschwerpunktradius:
r_FK := 50 mm
# Gesamtfederkraft:
F_F := 25 N
# Winkelgeschwindigkeit:
ω_FK := 2*π*n_S = 146.608 1/s
# Fliehkraft:
F_Flieh := m_FK*r_FK*ω_FK^2 = 537.345 N
# Kontaktkraft:
F_N;FK := F_Flieh - F_F = 512.345 N
# Reibkraft an einem Fliehkörper:
F_R;FK := μ_0;FK*F_N;FK = 461.111 N
# Reibmoment:
M_R;FK := N_FK*F_R;FK*D_R/2 = 64.5555 N*m
# Schmierstoffberechnung
# Ölstand soll bis zur unteren Zahnradstufe (Zahnräder 3 & 4) reichen
# Kraft-Geschwindigkeits-Faktor (für Stirnradgetriebe):
k_v := (3*F_t3/(b_3*d_T3)*(i_23 + 1)/i_23)*1/(π*d_T3*n_an/i_ges) = 5.71 kg/(mm^2*s)
k_v = 5.71 MPa*s/m
# Gl.20-2
# CLP 150 wird als Schmieröl verwendet
# TB 20-7a
# CLP 150 nach DIN 51517; Viskositätsklasse 150, d.h. bei 40°C hat das Öl eine kinematische Viskosität im Bereich von 135 bis 165 mm^2/s
